<Lems>

    <!--

        This LEMS file has been automatically generated using PyNeuroML v0.3.5 (libNeuroML v0.2.34)

     -->

    <!-- Specify which component to run -->
    <Target component="Sim_HybridTut"/>

    <!-- Include core NeuroML2 ComponentType definitions -->
    <Include file="Cells.xml"/>
    <Include file="Networks.xml"/>
    <Include file="Simulation.xml"/>

    <Include file="HybridTut.net.nml"/>

    <Simulation id="Sim_HybridTut" length="1000.0ms" step="0.01ms" target="HybridTut" seed="12345">  <!-- Note seed: ensures same random numbers used every run -->

        <Display id="DispPop__PYR_HH" title="Membrane potentials of cells in PYR_HH" timeScale="1ms" xmin="-100.0" xmax="1100.0" ymin="-90" ymax="50">
            <Line id="PYR_HH[0]: v" quantity="PYR_HH/0/CELL_HH_PYR/v" scale="1mV" color="#97065c" timeScale="1ms"/>
            <Line id="PYR_HH[1]: v" quantity="PYR_HH/1/CELL_HH_PYR/v" scale="1mV" color="#a2eb22" timeScale="1ms"/>
            <Line id="PYR_HH[2]: v" quantity="PYR_HH/2/CELL_HH_PYR/v" scale="1mV" color="#6a7645" timeScale="1ms"/>
            <Line id="PYR_HH[3]: v" quantity="PYR_HH/3/CELL_HH_PYR/v" scale="1mV" color="#dea975" timeScale="1ms"/>
            <Line id="PYR_HH[4]: v" quantity="PYR_HH/4/CELL_HH_PYR/v" scale="1mV" color="#bd0690" timeScale="1ms"/>
            <Line id="PYR_HH[5]: v" quantity="PYR_HH/5/CELL_HH_PYR/v" scale="1mV" color="#653461" timeScale="1ms"/>
            <Line id="PYR_HH[6]: v" quantity="PYR_HH/6/CELL_HH_PYR/v" scale="1mV" color="#c81495" timeScale="1ms"/>
            <Line id="PYR_HH[7]: v" quantity="PYR_HH/7/CELL_HH_PYR/v" scale="1mV" color="#0b4033" timeScale="1ms"/>
            <Line id="PYR_HH[8]: v" quantity="PYR_HH/8/CELL_HH_PYR/v" scale="1mV" color="#b563ef" timeScale="1ms"/>
            <Line id="PYR_HH[9]: v" quantity="PYR_HH/9/CELL_HH_PYR/v" scale="1mV" color="#5d92a9" timeScale="1ms"/>
            <Line id="PYR_HH[10]: v" quantity="PYR_HH/10/CELL_HH_PYR/v" scale="1mV" color="#d52c85" timeScale="1ms"/>
            <Line id="PYR_HH[11]: v" quantity="PYR_HH/11/CELL_HH_PYR/v" scale="1mV" color="#ce05a9" timeScale="1ms"/>
            <Line id="PYR_HH[12]: v" quantity="PYR_HH/12/CELL_HH_PYR/v" scale="1mV" color="#cfbf0f" timeScale="1ms"/>
            <Line id="PYR_HH[13]: v" quantity="PYR_HH/13/CELL_HH_PYR/v" scale="1mV" color="#82fba0" timeScale="1ms"/>
            <Line id="PYR_HH[14]: v" quantity="PYR_HH/14/CELL_HH_PYR/v" scale="1mV" color="#6f7b50" timeScale="1ms"/>
            <Line id="PYR_HH[15]: v" quantity="PYR_HH/15/CELL_HH_PYR/v" scale="1mV" color="#ca78bd" timeScale="1ms"/>
            <Line id="PYR_HH[16]: v" quantity="PYR_HH/16/CELL_HH_PYR/v" scale="1mV" color="#523823" timeScale="1ms"/>
            <Line id="PYR_HH[17]: v" quantity="PYR_HH/17/CELL_HH_PYR/v" scale="1mV" color="#f86b05" timeScale="1ms"/>
            <Line id="PYR_HH[18]: v" quantity="PYR_HH/18/CELL_HH_PYR/v" scale="1mV" color="#c75dfe" timeScale="1ms"/>
            <Line id="PYR_HH[19]: v" quantity="PYR_HH/19/CELL_HH_PYR/v" scale="1mV" color="#0ca002" timeScale="1ms"/>
            <Line id="PYR_HH[20]: v" quantity="PYR_HH/20/CELL_HH_PYR/v" scale="1mV" color="#d0e572" timeScale="1ms"/>
            <Line id="PYR_HH[21]: v" quantity="PYR_HH/21/CELL_HH_PYR/v" scale="1mV" color="#fcb83c" timeScale="1ms"/>
            <Line id="PYR_HH[22]: v" quantity="PYR_HH/22/CELL_HH_PYR/v" scale="1mV" color="#93c125" timeScale="1ms"/>
            <Line id="PYR_HH[23]: v" quantity="PYR_HH/23/CELL_HH_PYR/v" scale="1mV" color="#cecfcd" timeScale="1ms"/>
            <Line id="PYR_HH[24]: v" quantity="PYR_HH/24/CELL_HH_PYR/v" scale="1mV" color="#f6e063" timeScale="1ms"/>
            <Line id="PYR_HH[25]: v" quantity="PYR_HH/25/CELL_HH_PYR/v" scale="1mV" color="#df70f8" timeScale="1ms"/>
            <Line id="PYR_HH[26]: v" quantity="PYR_HH/26/CELL_HH_PYR/v" scale="1mV" color="#2c5052" timeScale="1ms"/>
            <Line id="PYR_HH[27]: v" quantity="PYR_HH/27/CELL_HH_PYR/v" scale="1mV" color="#81938b" timeScale="1ms"/>
            <Line id="PYR_HH[28]: v" quantity="PYR_HH/28/CELL_HH_PYR/v" scale="1mV" color="#fe42d7" timeScale="1ms"/>
            <Line id="PYR_HH[29]: v" quantity="PYR_HH/29/CELL_HH_PYR/v" scale="1mV" color="#2799e3" timeScale="1ms"/>
            <Line id="PYR_HH[30]: v" quantity="PYR_HH/30/CELL_HH_PYR/v" scale="1mV" color="#382063" timeScale="1ms"/>
            <Line id="PYR_HH[31]: v" quantity="PYR_HH/31/CELL_HH_PYR/v" scale="1mV" color="#9d5530" timeScale="1ms"/>
            <Line id="PYR_HH[32]: v" quantity="PYR_HH/32/CELL_HH_PYR/v" scale="1mV" color="#82793e" timeScale="1ms"/>
            <Line id="PYR_HH[33]: v" quantity="PYR_HH/33/CELL_HH_PYR/v" scale="1mV" color="#5eb62f" timeScale="1ms"/>
            <Line id="PYR_HH[34]: v" quantity="PYR_HH/34/CELL_HH_PYR/v" scale="1mV" color="#b4b558" timeScale="1ms"/>
            <Line id="PYR_HH[35]: v" quantity="PYR_HH/35/CELL_HH_PYR/v" scale="1mV" color="#316dbb" timeScale="1ms"/>
            <Line id="PYR_HH[36]: v" quantity="PYR_HH/36/CELL_HH_PYR/v" scale="1mV" color="#c0c29d" timeScale="1ms"/>
            <Line id="PYR_HH[37]: v" quantity="PYR_HH/37/CELL_HH_PYR/v" scale="1mV" color="#7a7ed2" timeScale="1ms"/>
            <Line id="PYR_HH[38]: v" quantity="PYR_HH/38/CELL_HH_PYR/v" scale="1mV" color="#782c3f" timeScale="1ms"/>
            <Line id="PYR_HH[39]: v" quantity="PYR_HH/39/CELL_HH_PYR/v" scale="1mV" color="#8114fa" timeScale="1ms"/>
            <Line id="PYR_HH[40]: v" quantity="PYR_HH/40/CELL_HH_PYR/v" scale="1mV" color="#059091" timeScale="1ms"/>
            <Line id="PYR_HH[41]: v" quantity="PYR_HH/41/CELL_HH_PYR/v" scale="1mV" color="#f4e45c" timeScale="1ms"/>
            <Line id="PYR_HH[42]: v" quantity="PYR_HH/42/CELL_HH_PYR/v" scale="1mV" color="#d44428" timeScale="1ms"/>
            <Line id="PYR_HH[43]: v" quantity="PYR_HH/43/CELL_HH_PYR/v" scale="1mV" color="#42a22d" timeScale="1ms"/>
            <Line id="PYR_HH[44]: v" quantity="PYR_HH/44/CELL_HH_PYR/v" scale="1mV" color="#b9885a" timeScale="1ms"/>
            <Line id="PYR_HH[45]: v" quantity="PYR_HH/45/CELL_HH_PYR/v" scale="1mV" color="#5b6bf6" timeScale="1ms"/>
            <Line id="PYR_HH[46]: v" quantity="PYR_HH/46/CELL_HH_PYR/v" scale="1mV" color="#73a1bc" timeScale="1ms"/>
            <Line id="PYR_HH[47]: v" quantity="PYR_HH/47/CELL_HH_PYR/v" scale="1mV" color="#eb7ed2" timeScale="1ms"/>
            <Line id="PYR_HH[48]: v" quantity="PYR_HH/48/CELL_HH_PYR/v" scale="1mV" color="#9e58e0" timeScale="1ms"/>
            <Line id="PYR_HH[49]: v" quantity="PYR_HH/49/CELL_HH_PYR/v" scale="1mV" color="#3b9f43" timeScale="1ms"/>
        </Display>

        <Display id="DispPop__PYR_Izhi" title="Membrane potentials of cells in PYR_Izhi" timeScale="1ms" xmin="-100.0" xmax="1100.0" ymin="-90" ymax="50">
            <Line id="PYR_Izhi[0]: v" quantity="PYR_Izhi/0/CELL_Izhi_PYR/v" scale="1mV" color="#a11c08" timeScale="1ms"/>
            <Line id="PYR_Izhi[1]: v" quantity="PYR_Izhi/1/CELL_Izhi_PYR/v" scale="1mV" color="#f163ac" timeScale="1ms"/>
            <Line id="PYR_Izhi[2]: v" quantity="PYR_Izhi/2/CELL_Izhi_PYR/v" scale="1mV" color="#8ec521" timeScale="1ms"/>
            <Line id="PYR_Izhi[3]: v" quantity="PYR_Izhi/3/CELL_Izhi_PYR/v" scale="1mV" color="#885334" timeScale="1ms"/>
            <Line id="PYR_Izhi[4]: v" quantity="PYR_Izhi/4/CELL_Izhi_PYR/v" scale="1mV" color="#7d4c71" timeScale="1ms"/>
            <Line id="PYR_Izhi[5]: v" quantity="PYR_Izhi/5/CELL_Izhi_PYR/v" scale="1mV" color="#9ffb60" timeScale="1ms"/>
            <Line id="PYR_Izhi[6]: v" quantity="PYR_Izhi/6/CELL_Izhi_PYR/v" scale="1mV" color="#e9edb3" timeScale="1ms"/>
            <Line id="PYR_Izhi[7]: v" quantity="PYR_Izhi/7/CELL_Izhi_PYR/v" scale="1mV" color="#405538" timeScale="1ms"/>
            <Line id="PYR_Izhi[8]: v" quantity="PYR_Izhi/8/CELL_Izhi_PYR/v" scale="1mV" color="#e660e7" timeScale="1ms"/>
            <Line id="PYR_Izhi[9]: v" quantity="PYR_Izhi/9/CELL_Izhi_PYR/v" scale="1mV" color="#f0b4e4" timeScale="1ms"/>
            <Line id="PYR_Izhi[10]: v" quantity="PYR_Izhi/10/CELL_Izhi_PYR/v" scale="1mV" color="#58c4bb" timeScale="1ms"/>
            <Line id="PYR_Izhi[11]: v" quantity="PYR_Izhi/11/CELL_Izhi_PYR/v" scale="1mV" color="#ec47dd" timeScale="1ms"/>
            <Line id="PYR_Izhi[12]: v" quantity="PYR_Izhi/12/CELL_Izhi_PYR/v" scale="1mV" color="#b8c993" timeScale="1ms"/>
            <Line id="PYR_Izhi[13]: v" quantity="PYR_Izhi/13/CELL_Izhi_PYR/v" scale="1mV" color="#025284" timeScale="1ms"/>
            <Line id="PYR_Izhi[14]: v" quantity="PYR_Izhi/14/CELL_Izhi_PYR/v" scale="1mV" color="#b3cb78" timeScale="1ms"/>
            <Line id="PYR_Izhi[15]: v" quantity="PYR_Izhi/15/CELL_Izhi_PYR/v" scale="1mV" color="#636c29" timeScale="1ms"/>
            <Line id="PYR_Izhi[16]: v" quantity="PYR_Izhi/16/CELL_Izhi_PYR/v" scale="1mV" color="#f0d132" timeScale="1ms"/>
            <Line id="PYR_Izhi[17]: v" quantity="PYR_Izhi/17/CELL_Izhi_PYR/v" scale="1mV" color="#6e05ee" timeScale="1ms"/>
            <Line id="PYR_Izhi[18]: v" quantity="PYR_Izhi/18/CELL_Izhi_PYR/v" scale="1mV" color="#81c550" timeScale="1ms"/>
            <Line id="PYR_Izhi[19]: v" quantity="PYR_Izhi/19/CELL_Izhi_PYR/v" scale="1mV" color="#b4311f" timeScale="1ms"/>
            <Line id="PYR_Izhi[20]: v" quantity="PYR_Izhi/20/CELL_Izhi_PYR/v" scale="1mV" color="#a265d4" timeScale="1ms"/>
            <Line id="PYR_Izhi[21]: v" quantity="PYR_Izhi/21/CELL_Izhi_PYR/v" scale="1mV" color="#33be7e" timeScale="1ms"/>
            <Line id="PYR_Izhi[22]: v" quantity="PYR_Izhi/22/CELL_Izhi_PYR/v" scale="1mV" color="#5a88a9" timeScale="1ms"/>
            <Line id="PYR_Izhi[23]: v" quantity="PYR_Izhi/23/CELL_Izhi_PYR/v" scale="1mV" color="#b41bea" timeScale="1ms"/>
            <Line id="PYR_Izhi[24]: v" quantity="PYR_Izhi/24/CELL_Izhi_PYR/v" scale="1mV" color="#34a53c" timeScale="1ms"/>
            <Line id="PYR_Izhi[25]: v" quantity="PYR_Izhi/25/CELL_Izhi_PYR/v" scale="1mV" color="#dbd02b" timeScale="1ms"/>
            <Line id="PYR_Izhi[26]: v" quantity="PYR_Izhi/26/CELL_Izhi_PYR/v" scale="1mV" color="#e74cde" timeScale="1ms"/>
            <Line id="PYR_Izhi[27]: v" quantity="PYR_Izhi/27/CELL_Izhi_PYR/v" scale="1mV" color="#fdd5fe" timeScale="1ms"/>
            <Line id="PYR_Izhi[28]: v" quantity="PYR_Izhi/28/CELL_Izhi_PYR/v" scale="1mV" color="#868d0b" timeScale="1ms"/>
            <Line id="PYR_Izhi[29]: v" quantity="PYR_Izhi/29/CELL_Izhi_PYR/v" scale="1mV" color="#02effa" timeScale="1ms"/>
            <Line id="PYR_Izhi[30]: v" quantity="PYR_Izhi/30/CELL_Izhi_PYR/v" scale="1mV" color="#0effd1" timeScale="1ms"/>
            <Line id="PYR_Izhi[31]: v" quantity="PYR_Izhi/31/CELL_Izhi_PYR/v" scale="1mV" color="#bb9bbe" timeScale="1ms"/>
            <Line id="PYR_Izhi[32]: v" quantity="PYR_Izhi/32/CELL_Izhi_PYR/v" scale="1mV" color="#3df621" timeScale="1ms"/>
            <Line id="PYR_Izhi[33]: v" quantity="PYR_Izhi/33/CELL_Izhi_PYR/v" scale="1mV" color="#c29d3f" timeScale="1ms"/>
            <Line id="PYR_Izhi[34]: v" quantity="PYR_Izhi/34/CELL_Izhi_PYR/v" scale="1mV" color="#4d5062" timeScale="1ms"/>
            <Line id="PYR_Izhi[35]: v" quantity="PYR_Izhi/35/CELL_Izhi_PYR/v" scale="1mV" color="#ba0ea6" timeScale="1ms"/>
            <Line id="PYR_Izhi[36]: v" quantity="PYR_Izhi/36/CELL_Izhi_PYR/v" scale="1mV" color="#552194" timeScale="1ms"/>
            <Line id="PYR_Izhi[37]: v" quantity="PYR_Izhi/37/CELL_Izhi_PYR/v" scale="1mV" color="#90a0bc" timeScale="1ms"/>
            <Line id="PYR_Izhi[38]: v" quantity="PYR_Izhi/38/CELL_Izhi_PYR/v" scale="1mV" color="#6904dd" timeScale="1ms"/>
            <Line id="PYR_Izhi[39]: v" quantity="PYR_Izhi/39/CELL_Izhi_PYR/v" scale="1mV" color="#f719ef" timeScale="1ms"/>
            <Line id="PYR_Izhi[40]: v" quantity="PYR_Izhi/40/CELL_Izhi_PYR/v" scale="1mV" color="#d34157" timeScale="1ms"/>
            <Line id="PYR_Izhi[41]: v" quantity="PYR_Izhi/41/CELL_Izhi_PYR/v" scale="1mV" color="#638c92" timeScale="1ms"/>
            <Line id="PYR_Izhi[42]: v" quantity="PYR_Izhi/42/CELL_Izhi_PYR/v" scale="1mV" color="#7903ec" timeScale="1ms"/>
            <Line id="PYR_Izhi[43]: v" quantity="PYR_Izhi/43/CELL_Izhi_PYR/v" scale="1mV" color="#bf8df3" timeScale="1ms"/>
            <Line id="PYR_Izhi[44]: v" quantity="PYR_Izhi/44/CELL_Izhi_PYR/v" scale="1mV" color="#5922e8" timeScale="1ms"/>
            <Line id="PYR_Izhi[45]: v" quantity="PYR_Izhi/45/CELL_Izhi_PYR/v" scale="1mV" color="#7bed79" timeScale="1ms"/>
            <Line id="PYR_Izhi[46]: v" quantity="PYR_Izhi/46/CELL_Izhi_PYR/v" scale="1mV" color="#476780" timeScale="1ms"/>
            <Line id="PYR_Izhi[47]: v" quantity="PYR_Izhi/47/CELL_Izhi_PYR/v" scale="1mV" color="#d24899" timeScale="1ms"/>
            <Line id="PYR_Izhi[48]: v" quantity="PYR_Izhi/48/CELL_Izhi_PYR/v" scale="1mV" color="#f344c2" timeScale="1ms"/>
            <Line id="PYR_Izhi[49]: v" quantity="PYR_Izhi/49/CELL_Izhi_PYR/v" scale="1mV" color="#a0b00f" timeScale="1ms"/>
        </Display>

        <OutputFile id="Volts_file__PYR_HH" fileName="Sim_HybridTut.PYR_HH.v.dat">
            <OutputColumn id="v_PYR_HH_0_CELL_HH_PYR_v" quantity="PYR_HH/0/CELL_HH_PYR/v"/>
            <OutputColumn id="v_PYR_HH_1_CELL_HH_PYR_v" quantity="PYR_HH/1/CELL_HH_PYR/v"/>
            <OutputColumn id="v_PYR_HH_2_CELL_HH_PYR_v" quantity="PYR_HH/2/CELL_HH_PYR/v"/>
            <OutputColumn id="v_PYR_HH_3_CELL_HH_PYR_v" quantity="PYR_HH/3/CELL_HH_PYR/v"/>
            <OutputColumn id="v_PYR_HH_4_CELL_HH_PYR_v" quantity="PYR_HH/4/CELL_HH_PYR/v"/>
            <OutputColumn id="v_PYR_HH_5_CELL_HH_PYR_v" quantity="PYR_HH/5/CELL_HH_PYR/v"/>
            <OutputColumn id="v_PYR_HH_6_CELL_HH_PYR_v" quantity="PYR_HH/6/CELL_HH_PYR/v"/>
            <OutputColumn id="v_PYR_HH_7_CELL_HH_PYR_v" quantity="PYR_HH/7/CELL_HH_PYR/v"/>
            <OutputColumn id="v_PYR_HH_8_CELL_HH_PYR_v" quantity="PYR_HH/8/CELL_HH_PYR/v"/>
            <OutputColumn id="v_PYR_HH_9_CELL_HH_PYR_v" quantity="PYR_HH/9/CELL_HH_PYR/v"/>
            <OutputColumn id="v_PYR_HH_10_CELL_HH_PYR_v" quantity="PYR_HH/10/CELL_HH_PYR/v"/>
            <OutputColumn id="v_PYR_HH_11_CELL_HH_PYR_v" quantity="PYR_HH/11/CELL_HH_PYR/v"/>
            <OutputColumn id="v_PYR_HH_12_CELL_HH_PYR_v" quantity="PYR_HH/12/CELL_HH_PYR/v"/>
            <OutputColumn id="v_PYR_HH_13_CELL_HH_PYR_v" quantity="PYR_HH/13/CELL_HH_PYR/v"/>
            <OutputColumn id="v_PYR_HH_14_CELL_HH_PYR_v" quantity="PYR_HH/14/CELL_HH_PYR/v"/>
            <OutputColumn id="v_PYR_HH_15_CELL_HH_PYR_v" quantity="PYR_HH/15/CELL_HH_PYR/v"/>
            <OutputColumn id="v_PYR_HH_16_CELL_HH_PYR_v" quantity="PYR_HH/16/CELL_HH_PYR/v"/>
            <OutputColumn id="v_PYR_HH_17_CELL_HH_PYR_v" quantity="PYR_HH/17/CELL_HH_PYR/v"/>
            <OutputColumn id="v_PYR_HH_18_CELL_HH_PYR_v" quantity="PYR_HH/18/CELL_HH_PYR/v"/>
            <OutputColumn id="v_PYR_HH_19_CELL_HH_PYR_v" quantity="PYR_HH/19/CELL_HH_PYR/v"/>
            <OutputColumn id="v_PYR_HH_20_CELL_HH_PYR_v" quantity="PYR_HH/20/CELL_HH_PYR/v"/>
            <OutputColumn id="v_PYR_HH_21_CELL_HH_PYR_v" quantity="PYR_HH/21/CELL_HH_PYR/v"/>
            <OutputColumn id="v_PYR_HH_22_CELL_HH_PYR_v" quantity="PYR_HH/22/CELL_HH_PYR/v"/>
            <OutputColumn id="v_PYR_HH_23_CELL_HH_PYR_v" quantity="PYR_HH/23/CELL_HH_PYR/v"/>
            <OutputColumn id="v_PYR_HH_24_CELL_HH_PYR_v" quantity="PYR_HH/24/CELL_HH_PYR/v"/>
            <OutputColumn id="v_PYR_HH_25_CELL_HH_PYR_v" quantity="PYR_HH/25/CELL_HH_PYR/v"/>
            <OutputColumn id="v_PYR_HH_26_CELL_HH_PYR_v" quantity="PYR_HH/26/CELL_HH_PYR/v"/>
            <OutputColumn id="v_PYR_HH_27_CELL_HH_PYR_v" quantity="PYR_HH/27/CELL_HH_PYR/v"/>
            <OutputColumn id="v_PYR_HH_28_CELL_HH_PYR_v" quantity="PYR_HH/28/CELL_HH_PYR/v"/>
            <OutputColumn id="v_PYR_HH_29_CELL_HH_PYR_v" quantity="PYR_HH/29/CELL_HH_PYR/v"/>
            <OutputColumn id="v_PYR_HH_30_CELL_HH_PYR_v" quantity="PYR_HH/30/CELL_HH_PYR/v"/>
            <OutputColumn id="v_PYR_HH_31_CELL_HH_PYR_v" quantity="PYR_HH/31/CELL_HH_PYR/v"/>
            <OutputColumn id="v_PYR_HH_32_CELL_HH_PYR_v" quantity="PYR_HH/32/CELL_HH_PYR/v"/>
            <OutputColumn id="v_PYR_HH_33_CELL_HH_PYR_v" quantity="PYR_HH/33/CELL_HH_PYR/v"/>
            <OutputColumn id="v_PYR_HH_34_CELL_HH_PYR_v" quantity="PYR_HH/34/CELL_HH_PYR/v"/>
            <OutputColumn id="v_PYR_HH_35_CELL_HH_PYR_v" quantity="PYR_HH/35/CELL_HH_PYR/v"/>
            <OutputColumn id="v_PYR_HH_36_CELL_HH_PYR_v" quantity="PYR_HH/36/CELL_HH_PYR/v"/>
            <OutputColumn id="v_PYR_HH_37_CELL_HH_PYR_v" quantity="PYR_HH/37/CELL_HH_PYR/v"/>
            <OutputColumn id="v_PYR_HH_38_CELL_HH_PYR_v" quantity="PYR_HH/38/CELL_HH_PYR/v"/>
            <OutputColumn id="v_PYR_HH_39_CELL_HH_PYR_v" quantity="PYR_HH/39/CELL_HH_PYR/v"/>
            <OutputColumn id="v_PYR_HH_40_CELL_HH_PYR_v" quantity="PYR_HH/40/CELL_HH_PYR/v"/>
            <OutputColumn id="v_PYR_HH_41_CELL_HH_PYR_v" quantity="PYR_HH/41/CELL_HH_PYR/v"/>
            <OutputColumn id="v_PYR_HH_42_CELL_HH_PYR_v" quantity="PYR_HH/42/CELL_HH_PYR/v"/>
            <OutputColumn id="v_PYR_HH_43_CELL_HH_PYR_v" quantity="PYR_HH/43/CELL_HH_PYR/v"/>
            <OutputColumn id="v_PYR_HH_44_CELL_HH_PYR_v" quantity="PYR_HH/44/CELL_HH_PYR/v"/>
            <OutputColumn id="v_PYR_HH_45_CELL_HH_PYR_v" quantity="PYR_HH/45/CELL_HH_PYR/v"/>
            <OutputColumn id="v_PYR_HH_46_CELL_HH_PYR_v" quantity="PYR_HH/46/CELL_HH_PYR/v"/>
            <OutputColumn id="v_PYR_HH_47_CELL_HH_PYR_v" quantity="PYR_HH/47/CELL_HH_PYR/v"/>
            <OutputColumn id="v_PYR_HH_48_CELL_HH_PYR_v" quantity="PYR_HH/48/CELL_HH_PYR/v"/>
            <OutputColumn id="v_PYR_HH_49_CELL_HH_PYR_v" quantity="PYR_HH/49/CELL_HH_PYR/v"/>
        </OutputFile>

        <OutputFile id="Volts_file__PYR_Izhi" fileName="Sim_HybridTut.PYR_Izhi.v.dat">
            <OutputColumn id="v_PYR_Izhi_0_CELL_Izhi_PYR_v" quantity="PYR_Izhi/0/CELL_Izhi_PYR/v"/>
            <OutputColumn id="v_PYR_Izhi_1_CELL_Izhi_PYR_v" quantity="PYR_Izhi/1/CELL_Izhi_PYR/v"/>
            <OutputColumn id="v_PYR_Izhi_2_CELL_Izhi_PYR_v" quantity="PYR_Izhi/2/CELL_Izhi_PYR/v"/>
            <OutputColumn id="v_PYR_Izhi_3_CELL_Izhi_PYR_v" quantity="PYR_Izhi/3/CELL_Izhi_PYR/v"/>
            <OutputColumn id="v_PYR_Izhi_4_CELL_Izhi_PYR_v" quantity="PYR_Izhi/4/CELL_Izhi_PYR/v"/>
            <OutputColumn id="v_PYR_Izhi_5_CELL_Izhi_PYR_v" quantity="PYR_Izhi/5/CELL_Izhi_PYR/v"/>
            <OutputColumn id="v_PYR_Izhi_6_CELL_Izhi_PYR_v" quantity="PYR_Izhi/6/CELL_Izhi_PYR/v"/>
            <OutputColumn id="v_PYR_Izhi_7_CELL_Izhi_PYR_v" quantity="PYR_Izhi/7/CELL_Izhi_PYR/v"/>
            <OutputColumn id="v_PYR_Izhi_8_CELL_Izhi_PYR_v" quantity="PYR_Izhi/8/CELL_Izhi_PYR/v"/>
            <OutputColumn id="v_PYR_Izhi_9_CELL_Izhi_PYR_v" quantity="PYR_Izhi/9/CELL_Izhi_PYR/v"/>
            <OutputColumn id="v_PYR_Izhi_10_CELL_Izhi_PYR_v" quantity="PYR_Izhi/10/CELL_Izhi_PYR/v"/>
            <OutputColumn id="v_PYR_Izhi_11_CELL_Izhi_PYR_v" quantity="PYR_Izhi/11/CELL_Izhi_PYR/v"/>
            <OutputColumn id="v_PYR_Izhi_12_CELL_Izhi_PYR_v" quantity="PYR_Izhi/12/CELL_Izhi_PYR/v"/>
            <OutputColumn id="v_PYR_Izhi_13_CELL_Izhi_PYR_v" quantity="PYR_Izhi/13/CELL_Izhi_PYR/v"/>
            <OutputColumn id="v_PYR_Izhi_14_CELL_Izhi_PYR_v" quantity="PYR_Izhi/14/CELL_Izhi_PYR/v"/>
            <OutputColumn id="v_PYR_Izhi_15_CELL_Izhi_PYR_v" quantity="PYR_Izhi/15/CELL_Izhi_PYR/v"/>
            <OutputColumn id="v_PYR_Izhi_16_CELL_Izhi_PYR_v" quantity="PYR_Izhi/16/CELL_Izhi_PYR/v"/>
            <OutputColumn id="v_PYR_Izhi_17_CELL_Izhi_PYR_v" quantity="PYR_Izhi/17/CELL_Izhi_PYR/v"/>
            <OutputColumn id="v_PYR_Izhi_18_CELL_Izhi_PYR_v" quantity="PYR_Izhi/18/CELL_Izhi_PYR/v"/>
            <OutputColumn id="v_PYR_Izhi_19_CELL_Izhi_PYR_v" quantity="PYR_Izhi/19/CELL_Izhi_PYR/v"/>
            <OutputColumn id="v_PYR_Izhi_20_CELL_Izhi_PYR_v" quantity="PYR_Izhi/20/CELL_Izhi_PYR/v"/>
            <OutputColumn id="v_PYR_Izhi_21_CELL_Izhi_PYR_v" quantity="PYR_Izhi/21/CELL_Izhi_PYR/v"/>
            <OutputColumn id="v_PYR_Izhi_22_CELL_Izhi_PYR_v" quantity="PYR_Izhi/22/CELL_Izhi_PYR/v"/>
            <OutputColumn id="v_PYR_Izhi_23_CELL_Izhi_PYR_v" quantity="PYR_Izhi/23/CELL_Izhi_PYR/v"/>
            <OutputColumn id="v_PYR_Izhi_24_CELL_Izhi_PYR_v" quantity="PYR_Izhi/24/CELL_Izhi_PYR/v"/>
            <OutputColumn id="v_PYR_Izhi_25_CELL_Izhi_PYR_v" quantity="PYR_Izhi/25/CELL_Izhi_PYR/v"/>
            <OutputColumn id="v_PYR_Izhi_26_CELL_Izhi_PYR_v" quantity="PYR_Izhi/26/CELL_Izhi_PYR/v"/>
            <OutputColumn id="v_PYR_Izhi_27_CELL_Izhi_PYR_v" quantity="PYR_Izhi/27/CELL_Izhi_PYR/v"/>
            <OutputColumn id="v_PYR_Izhi_28_CELL_Izhi_PYR_v" quantity="PYR_Izhi/28/CELL_Izhi_PYR/v"/>
            <OutputColumn id="v_PYR_Izhi_29_CELL_Izhi_PYR_v" quantity="PYR_Izhi/29/CELL_Izhi_PYR/v"/>
            <OutputColumn id="v_PYR_Izhi_30_CELL_Izhi_PYR_v" quantity="PYR_Izhi/30/CELL_Izhi_PYR/v"/>
            <OutputColumn id="v_PYR_Izhi_31_CELL_Izhi_PYR_v" quantity="PYR_Izhi/31/CELL_Izhi_PYR/v"/>
            <OutputColumn id="v_PYR_Izhi_32_CELL_Izhi_PYR_v" quantity="PYR_Izhi/32/CELL_Izhi_PYR/v"/>
            <OutputColumn id="v_PYR_Izhi_33_CELL_Izhi_PYR_v" quantity="PYR_Izhi/33/CELL_Izhi_PYR/v"/>
            <OutputColumn id="v_PYR_Izhi_34_CELL_Izhi_PYR_v" quantity="PYR_Izhi/34/CELL_Izhi_PYR/v"/>
            <OutputColumn id="v_PYR_Izhi_35_CELL_Izhi_PYR_v" quantity="PYR_Izhi/35/CELL_Izhi_PYR/v"/>
            <OutputColumn id="v_PYR_Izhi_36_CELL_Izhi_PYR_v" quantity="PYR_Izhi/36/CELL_Izhi_PYR/v"/>
            <OutputColumn id="v_PYR_Izhi_37_CELL_Izhi_PYR_v" quantity="PYR_Izhi/37/CELL_Izhi_PYR/v"/>
            <OutputColumn id="v_PYR_Izhi_38_CELL_Izhi_PYR_v" quantity="PYR_Izhi/38/CELL_Izhi_PYR/v"/>
            <OutputColumn id="v_PYR_Izhi_39_CELL_Izhi_PYR_v" quantity="PYR_Izhi/39/CELL_Izhi_PYR/v"/>
            <OutputColumn id="v_PYR_Izhi_40_CELL_Izhi_PYR_v" quantity="PYR_Izhi/40/CELL_Izhi_PYR/v"/>
            <OutputColumn id="v_PYR_Izhi_41_CELL_Izhi_PYR_v" quantity="PYR_Izhi/41/CELL_Izhi_PYR/v"/>
            <OutputColumn id="v_PYR_Izhi_42_CELL_Izhi_PYR_v" quantity="PYR_Izhi/42/CELL_Izhi_PYR/v"/>
            <OutputColumn id="v_PYR_Izhi_43_CELL_Izhi_PYR_v" quantity="PYR_Izhi/43/CELL_Izhi_PYR/v"/>
            <OutputColumn id="v_PYR_Izhi_44_CELL_Izhi_PYR_v" quantity="PYR_Izhi/44/CELL_Izhi_PYR/v"/>
            <OutputColumn id="v_PYR_Izhi_45_CELL_Izhi_PYR_v" quantity="PYR_Izhi/45/CELL_Izhi_PYR/v"/>
            <OutputColumn id="v_PYR_Izhi_46_CELL_Izhi_PYR_v" quantity="PYR_Izhi/46/CELL_Izhi_PYR/v"/>
            <OutputColumn id="v_PYR_Izhi_47_CELL_Izhi_PYR_v" quantity="PYR_Izhi/47/CELL_Izhi_PYR/v"/>
            <OutputColumn id="v_PYR_Izhi_48_CELL_Izhi_PYR_v" quantity="PYR_Izhi/48/CELL_Izhi_PYR/v"/>
            <OutputColumn id="v_PYR_Izhi_49_CELL_Izhi_PYR_v" quantity="PYR_Izhi/49/CELL_Izhi_PYR/v"/>
        </OutputFile>

    </Simulation>

</Lems>
