<Lems>

    <!--

        This LEMS file has been automatically generated using PyNeuroML v0.3.5 (libNeuroML v0.2.35)

     -->

    <!-- Specify which component to run -->
    <Target component="Sim_M1"/>

    <!-- Include core NeuroML2 ComponentType definitions -->
    <Include file="Cells.xml"/>
    <Include file="Networks.xml"/>
    <Include file="Simulation.xml"/>

    <Include file="M1.net.nml"/>

    <Simulation id="Sim_M1" length="100ms" step="0.01ms" target="M1" seed="12345">  <!-- Note seed: ensures same random numbers used every run -->

        <Display id="DispPop__IT_L23" title="Membrane potentials of cells in IT_L23" timeScale="1ms" xmin="-10.0" xmax="110.0" ymin="-90" ymax="50">
            <Line id="IT_L23[0]: v" quantity="IT_L23/0/CELL_IT/v" scale="1mV" color="#61cd1e" timeScale="1ms"/>
            <Line id="IT_L23[1]: v" quantity="IT_L23/1/CELL_IT/v" scale="1mV" color="#81ebc8" timeScale="1ms"/>
            <Line id="IT_L23[2]: v" quantity="IT_L23/2/CELL_IT/v" scale="1mV" color="#b8084b" timeScale="1ms"/>
            <Line id="IT_L23[3]: v" quantity="IT_L23/3/CELL_IT/v" scale="1mV" color="#813c4d" timeScale="1ms"/>
            <Line id="IT_L23[4]: v" quantity="IT_L23/4/CELL_IT/v" scale="1mV" color="#0a5f52" timeScale="1ms"/>
            <Line id="IT_L23[5]: v" quantity="IT_L23/5/CELL_IT/v" scale="1mV" color="#63102c" timeScale="1ms"/>
            <Line id="IT_L23[6]: v" quantity="IT_L23/6/CELL_IT/v" scale="1mV" color="#b5dd0d" timeScale="1ms"/>
            <Line id="IT_L23[7]: v" quantity="IT_L23/7/CELL_IT/v" scale="1mV" color="#9f77f5" timeScale="1ms"/>
            <Line id="IT_L23[8]: v" quantity="IT_L23/8/CELL_IT/v" scale="1mV" color="#83d0f0" timeScale="1ms"/>
            <Line id="IT_L23[9]: v" quantity="IT_L23/9/CELL_IT/v" scale="1mV" color="#203414" timeScale="1ms"/>
            <Line id="IT_L23[10]: v" quantity="IT_L23/10/CELL_IT/v" scale="1mV" color="#9a7a0e" timeScale="1ms"/>
            <Line id="IT_L23[11]: v" quantity="IT_L23/11/CELL_IT/v" scale="1mV" color="#70d560" timeScale="1ms"/>
            <Line id="IT_L23[12]: v" quantity="IT_L23/12/CELL_IT/v" scale="1mV" color="#bdb515" timeScale="1ms"/>
            <Line id="IT_L23[13]: v" quantity="IT_L23/13/CELL_IT/v" scale="1mV" color="#159dbb" timeScale="1ms"/>
            <Line id="IT_L23[14]: v" quantity="IT_L23/14/CELL_IT/v" scale="1mV" color="#e196c6" timeScale="1ms"/>
            <Line id="IT_L23[15]: v" quantity="IT_L23/15/CELL_IT/v" scale="1mV" color="#b65407" timeScale="1ms"/>
            <Line id="IT_L23[16]: v" quantity="IT_L23/16/CELL_IT/v" scale="1mV" color="#4880ff" timeScale="1ms"/>
            <Line id="IT_L23[17]: v" quantity="IT_L23/17/CELL_IT/v" scale="1mV" color="#e53134" timeScale="1ms"/>
            <Line id="IT_L23[18]: v" quantity="IT_L23/18/CELL_IT/v" scale="1mV" color="#01bbd6" timeScale="1ms"/>
            <Line id="IT_L23[19]: v" quantity="IT_L23/19/CELL_IT/v" scale="1mV" color="#337c9e" timeScale="1ms"/>
            <Line id="IT_L23[20]: v" quantity="IT_L23/20/CELL_IT/v" scale="1mV" color="#4a942f" timeScale="1ms"/>
            <Line id="IT_L23[21]: v" quantity="IT_L23/21/CELL_IT/v" scale="1mV" color="#6732f2" timeScale="1ms"/>
            <Line id="IT_L23[22]: v" quantity="IT_L23/22/CELL_IT/v" scale="1mV" color="#a5fe2a" timeScale="1ms"/>
            <Line id="IT_L23[23]: v" quantity="IT_L23/23/CELL_IT/v" scale="1mV" color="#4702dc" timeScale="1ms"/>
            <Line id="IT_L23[24]: v" quantity="IT_L23/24/CELL_IT/v" scale="1mV" color="#4d4461" timeScale="1ms"/>
            <Line id="IT_L23[25]: v" quantity="IT_L23/25/CELL_IT/v" scale="1mV" color="#2b221c" timeScale="1ms"/>
            <Line id="IT_L23[26]: v" quantity="IT_L23/26/CELL_IT/v" scale="1mV" color="#b89743" timeScale="1ms"/>
            <Line id="IT_L23[27]: v" quantity="IT_L23/27/CELL_IT/v" scale="1mV" color="#3be965" timeScale="1ms"/>
            <Line id="IT_L23[28]: v" quantity="IT_L23/28/CELL_IT/v" scale="1mV" color="#6a83e4" timeScale="1ms"/>
            <Line id="IT_L23[29]: v" quantity="IT_L23/29/CELL_IT/v" scale="1mV" color="#eceeb9" timeScale="1ms"/>
            <Line id="IT_L23[30]: v" quantity="IT_L23/30/CELL_IT/v" scale="1mV" color="#ceeb11" timeScale="1ms"/>
            <Line id="IT_L23[31]: v" quantity="IT_L23/31/CELL_IT/v" scale="1mV" color="#0d8995" timeScale="1ms"/>
            <Line id="IT_L23[32]: v" quantity="IT_L23/32/CELL_IT/v" scale="1mV" color="#31b6cf" timeScale="1ms"/>
            <Line id="IT_L23[33]: v" quantity="IT_L23/33/CELL_IT/v" scale="1mV" color="#4bb16e" timeScale="1ms"/>
            <Line id="IT_L23[34]: v" quantity="IT_L23/34/CELL_IT/v" scale="1mV" color="#49927e" timeScale="1ms"/>
            <Line id="IT_L23[35]: v" quantity="IT_L23/35/CELL_IT/v" scale="1mV" color="#95ac21" timeScale="1ms"/>
            <Line id="IT_L23[36]: v" quantity="IT_L23/36/CELL_IT/v" scale="1mV" color="#04a424" timeScale="1ms"/>
            <Line id="IT_L23[37]: v" quantity="IT_L23/37/CELL_IT/v" scale="1mV" color="#925c38" timeScale="1ms"/>
            <Line id="IT_L23[38]: v" quantity="IT_L23/38/CELL_IT/v" scale="1mV" color="#aa596e" timeScale="1ms"/>
            <Line id="IT_L23[39]: v" quantity="IT_L23/39/CELL_IT/v" scale="1mV" color="#3e54ab" timeScale="1ms"/>
            <Line id="IT_L23[40]: v" quantity="IT_L23/40/CELL_IT/v" scale="1mV" color="#70062d" timeScale="1ms"/>
            <Line id="IT_L23[41]: v" quantity="IT_L23/41/CELL_IT/v" scale="1mV" color="#e11dd3" timeScale="1ms"/>
            <Line id="IT_L23[42]: v" quantity="IT_L23/42/CELL_IT/v" scale="1mV" color="#0bc015" timeScale="1ms"/>
            <Line id="IT_L23[43]: v" quantity="IT_L23/43/CELL_IT/v" scale="1mV" color="#02514f" timeScale="1ms"/>
            <Line id="IT_L23[44]: v" quantity="IT_L23/44/CELL_IT/v" scale="1mV" color="#28a7f7" timeScale="1ms"/>
            <Line id="IT_L23[45]: v" quantity="IT_L23/45/CELL_IT/v" scale="1mV" color="#3c9167" timeScale="1ms"/>
            <Line id="IT_L23[46]: v" quantity="IT_L23/46/CELL_IT/v" scale="1mV" color="#7c1cec" timeScale="1ms"/>
            <Line id="IT_L23[47]: v" quantity="IT_L23/47/CELL_IT/v" scale="1mV" color="#084f13" timeScale="1ms"/>
            <Line id="IT_L23[48]: v" quantity="IT_L23/48/CELL_IT/v" scale="1mV" color="#0e113f" timeScale="1ms"/>
            <Line id="IT_L23[49]: v" quantity="IT_L23/49/CELL_IT/v" scale="1mV" color="#818072" timeScale="1ms"/>
            <Line id="IT_L23[50]: v" quantity="IT_L23/50/CELL_IT/v" scale="1mV" color="#e31a7b" timeScale="1ms"/>
        </Display>

        <Display id="DispPop__IT_L4" title="Membrane potentials of cells in IT_L4" timeScale="1ms" xmin="-10.0" xmax="110.0" ymin="-90" ymax="50">
            <Line id="IT_L4[0]: v" quantity="IT_L4/0/CELL_IT/v" scale="1mV" color="#9e35b4" timeScale="1ms"/>
            <Line id="IT_L4[1]: v" quantity="IT_L4/1/CELL_IT/v" scale="1mV" color="#c0b913" timeScale="1ms"/>
            <Line id="IT_L4[2]: v" quantity="IT_L4/2/CELL_IT/v" scale="1mV" color="#919eea" timeScale="1ms"/>
            <Line id="IT_L4[3]: v" quantity="IT_L4/3/CELL_IT/v" scale="1mV" color="#7e415c" timeScale="1ms"/>
            <Line id="IT_L4[4]: v" quantity="IT_L4/4/CELL_IT/v" scale="1mV" color="#8a7517" timeScale="1ms"/>
            <Line id="IT_L4[5]: v" quantity="IT_L4/5/CELL_IT/v" scale="1mV" color="#0bd603" timeScale="1ms"/>
            <Line id="IT_L4[6]: v" quantity="IT_L4/6/CELL_IT/v" scale="1mV" color="#0a87d9" timeScale="1ms"/>
            <Line id="IT_L4[7]: v" quantity="IT_L4/7/CELL_IT/v" scale="1mV" color="#b12149" timeScale="1ms"/>
            <Line id="IT_L4[8]: v" quantity="IT_L4/8/CELL_IT/v" scale="1mV" color="#5cbb11" timeScale="1ms"/>
            <Line id="IT_L4[9]: v" quantity="IT_L4/9/CELL_IT/v" scale="1mV" color="#ccf3fd" timeScale="1ms"/>
            <Line id="IT_L4[10]: v" quantity="IT_L4/10/CELL_IT/v" scale="1mV" color="#00e6a2" timeScale="1ms"/>
            <Line id="IT_L4[11]: v" quantity="IT_L4/11/CELL_IT/v" scale="1mV" color="#fdf077" timeScale="1ms"/>
            <Line id="IT_L4[12]: v" quantity="IT_L4/12/CELL_IT/v" scale="1mV" color="#aa9388" timeScale="1ms"/>
            <Line id="IT_L4[13]: v" quantity="IT_L4/13/CELL_IT/v" scale="1mV" color="#e48fcb" timeScale="1ms"/>
            <Line id="IT_L4[14]: v" quantity="IT_L4/14/CELL_IT/v" scale="1mV" color="#506cab" timeScale="1ms"/>
            <Line id="IT_L4[15]: v" quantity="IT_L4/15/CELL_IT/v" scale="1mV" color="#046078" timeScale="1ms"/>
            <Line id="IT_L4[16]: v" quantity="IT_L4/16/CELL_IT/v" scale="1mV" color="#887bfb" timeScale="1ms"/>
            <Line id="IT_L4[17]: v" quantity="IT_L4/17/CELL_IT/v" scale="1mV" color="#428a00" timeScale="1ms"/>
            <Line id="IT_L4[18]: v" quantity="IT_L4/18/CELL_IT/v" scale="1mV" color="#5f147e" timeScale="1ms"/>
            <Line id="IT_L4[19]: v" quantity="IT_L4/19/CELL_IT/v" scale="1mV" color="#bac952" timeScale="1ms"/>
            <Line id="IT_L4[20]: v" quantity="IT_L4/20/CELL_IT/v" scale="1mV" color="#6af784" timeScale="1ms"/>
            <Line id="IT_L4[21]: v" quantity="IT_L4/21/CELL_IT/v" scale="1mV" color="#1491e8" timeScale="1ms"/>
            <Line id="IT_L4[22]: v" quantity="IT_L4/22/CELL_IT/v" scale="1mV" color="#a8022c" timeScale="1ms"/>
            <Line id="IT_L4[23]: v" quantity="IT_L4/23/CELL_IT/v" scale="1mV" color="#99fd4f" timeScale="1ms"/>
            <Line id="IT_L4[24]: v" quantity="IT_L4/24/CELL_IT/v" scale="1mV" color="#142fb6" timeScale="1ms"/>
            <Line id="IT_L4[25]: v" quantity="IT_L4/25/CELL_IT/v" scale="1mV" color="#eceecb" timeScale="1ms"/>
        </Display>

        <Display id="DispPop__IT_L5A" title="Membrane potentials of cells in IT_L5A" timeScale="1ms" xmin="-10.0" xmax="110.0" ymin="-90" ymax="50">
            <Line id="IT_L5A[0]: v" quantity="IT_L5A/0/CELL_IT/v" scale="1mV" color="#e9b06c" timeScale="1ms"/>
            <Line id="IT_L5A[1]: v" quantity="IT_L5A/1/CELL_IT/v" scale="1mV" color="#f4ee42" timeScale="1ms"/>
            <Line id="IT_L5A[2]: v" quantity="IT_L5A/2/CELL_IT/v" scale="1mV" color="#2f6f70" timeScale="1ms"/>
            <Line id="IT_L5A[3]: v" quantity="IT_L5A/3/CELL_IT/v" scale="1mV" color="#fb382e" timeScale="1ms"/>
            <Line id="IT_L5A[4]: v" quantity="IT_L5A/4/CELL_IT/v" scale="1mV" color="#0e986f" timeScale="1ms"/>
            <Line id="IT_L5A[5]: v" quantity="IT_L5A/5/CELL_IT/v" scale="1mV" color="#d28f8c" timeScale="1ms"/>
            <Line id="IT_L5A[6]: v" quantity="IT_L5A/6/CELL_IT/v" scale="1mV" color="#2c4bf2" timeScale="1ms"/>
            <Line id="IT_L5A[7]: v" quantity="IT_L5A/7/CELL_IT/v" scale="1mV" color="#15d504" timeScale="1ms"/>
            <Line id="IT_L5A[8]: v" quantity="IT_L5A/8/CELL_IT/v" scale="1mV" color="#37eb4a" timeScale="1ms"/>
            <Line id="IT_L5A[9]: v" quantity="IT_L5A/9/CELL_IT/v" scale="1mV" color="#dbc7b1" timeScale="1ms"/>
            <Line id="IT_L5A[10]: v" quantity="IT_L5A/10/CELL_IT/v" scale="1mV" color="#96bf8a" timeScale="1ms"/>
            <Line id="IT_L5A[11]: v" quantity="IT_L5A/11/CELL_IT/v" scale="1mV" color="#78c387" timeScale="1ms"/>
            <Line id="IT_L5A[12]: v" quantity="IT_L5A/12/CELL_IT/v" scale="1mV" color="#3a0526" timeScale="1ms"/>
            <Line id="IT_L5A[13]: v" quantity="IT_L5A/13/CELL_IT/v" scale="1mV" color="#832131" timeScale="1ms"/>
            <Line id="IT_L5A[14]: v" quantity="IT_L5A/14/CELL_IT/v" scale="1mV" color="#1691d0" timeScale="1ms"/>
            <Line id="IT_L5A[15]: v" quantity="IT_L5A/15/CELL_IT/v" scale="1mV" color="#db8ef9" timeScale="1ms"/>
            <Line id="IT_L5A[16]: v" quantity="IT_L5A/16/CELL_IT/v" scale="1mV" color="#34711b" timeScale="1ms"/>
            <Line id="IT_L5A[17]: v" quantity="IT_L5A/17/CELL_IT/v" scale="1mV" color="#40ec9f" timeScale="1ms"/>
            <Line id="IT_L5A[18]: v" quantity="IT_L5A/18/CELL_IT/v" scale="1mV" color="#22e503" timeScale="1ms"/>
            <Line id="IT_L5A[19]: v" quantity="IT_L5A/19/CELL_IT/v" scale="1mV" color="#ab7f03" timeScale="1ms"/>
            <Line id="IT_L5A[20]: v" quantity="IT_L5A/20/CELL_IT/v" scale="1mV" color="#deed66" timeScale="1ms"/>
            <Line id="IT_L5A[21]: v" quantity="IT_L5A/21/CELL_IT/v" scale="1mV" color="#cb4583" timeScale="1ms"/>
            <Line id="IT_L5A[22]: v" quantity="IT_L5A/22/CELL_IT/v" scale="1mV" color="#546051" timeScale="1ms"/>
            <Line id="IT_L5A[23]: v" quantity="IT_L5A/23/CELL_IT/v" scale="1mV" color="#a35f3e" timeScale="1ms"/>
            <Line id="IT_L5A[24]: v" quantity="IT_L5A/24/CELL_IT/v" scale="1mV" color="#830e37" timeScale="1ms"/>
            <Line id="IT_L5A[25]: v" quantity="IT_L5A/25/CELL_IT/v" scale="1mV" color="#daf041" timeScale="1ms"/>
            <Line id="IT_L5A[26]: v" quantity="IT_L5A/26/CELL_IT/v" scale="1mV" color="#0c2cb1" timeScale="1ms"/>
            <Line id="IT_L5A[27]: v" quantity="IT_L5A/27/CELL_IT/v" scale="1mV" color="#ee15cc" timeScale="1ms"/>
            <Line id="IT_L5A[28]: v" quantity="IT_L5A/28/CELL_IT/v" scale="1mV" color="#aa6c4c" timeScale="1ms"/>
        </Display>

        <Display id="DispPop__IT_L5B" title="Membrane potentials of cells in IT_L5B" timeScale="1ms" xmin="-10.0" xmax="110.0" ymin="-90" ymax="50">
            <Line id="IT_L5B[0]: v" quantity="IT_L5B/0/CELL_IT/v" scale="1mV" color="#3dfe4a" timeScale="1ms"/>
            <Line id="IT_L5B[1]: v" quantity="IT_L5B/1/CELL_IT/v" scale="1mV" color="#2ecc65" timeScale="1ms"/>
            <Line id="IT_L5B[2]: v" quantity="IT_L5B/2/CELL_IT/v" scale="1mV" color="#725f98" timeScale="1ms"/>
            <Line id="IT_L5B[3]: v" quantity="IT_L5B/3/CELL_IT/v" scale="1mV" color="#bfc287" timeScale="1ms"/>
            <Line id="IT_L5B[4]: v" quantity="IT_L5B/4/CELL_IT/v" scale="1mV" color="#55ea71" timeScale="1ms"/>
            <Line id="IT_L5B[5]: v" quantity="IT_L5B/5/CELL_IT/v" scale="1mV" color="#7c9e9c" timeScale="1ms"/>
            <Line id="IT_L5B[6]: v" quantity="IT_L5B/6/CELL_IT/v" scale="1mV" color="#f0cbdc" timeScale="1ms"/>
            <Line id="IT_L5B[7]: v" quantity="IT_L5B/7/CELL_IT/v" scale="1mV" color="#0f2526" timeScale="1ms"/>
            <Line id="IT_L5B[8]: v" quantity="IT_L5B/8/CELL_IT/v" scale="1mV" color="#ad6eec" timeScale="1ms"/>
            <Line id="IT_L5B[9]: v" quantity="IT_L5B/9/CELL_IT/v" scale="1mV" color="#e50855" timeScale="1ms"/>
            <Line id="IT_L5B[10]: v" quantity="IT_L5B/10/CELL_IT/v" scale="1mV" color="#fa2b9b" timeScale="1ms"/>
            <Line id="IT_L5B[11]: v" quantity="IT_L5B/11/CELL_IT/v" scale="1mV" color="#9cbb80" timeScale="1ms"/>
            <Line id="IT_L5B[12]: v" quantity="IT_L5B/12/CELL_IT/v" scale="1mV" color="#142e48" timeScale="1ms"/>
            <Line id="IT_L5B[13]: v" quantity="IT_L5B/13/CELL_IT/v" scale="1mV" color="#3df09f" timeScale="1ms"/>
            <Line id="IT_L5B[14]: v" quantity="IT_L5B/14/CELL_IT/v" scale="1mV" color="#74697b" timeScale="1ms"/>
            <Line id="IT_L5B[15]: v" quantity="IT_L5B/15/CELL_IT/v" scale="1mV" color="#fe834f" timeScale="1ms"/>
            <Line id="IT_L5B[16]: v" quantity="IT_L5B/16/CELL_IT/v" scale="1mV" color="#567df0" timeScale="1ms"/>
            <Line id="IT_L5B[17]: v" quantity="IT_L5B/17/CELL_IT/v" scale="1mV" color="#7c7c32" timeScale="1ms"/>
            <Line id="IT_L5B[18]: v" quantity="IT_L5B/18/CELL_IT/v" scale="1mV" color="#75a258" timeScale="1ms"/>
            <Line id="IT_L5B[19]: v" quantity="IT_L5B/19/CELL_IT/v" scale="1mV" color="#0d696f" timeScale="1ms"/>
            <Line id="IT_L5B[20]: v" quantity="IT_L5B/20/CELL_IT/v" scale="1mV" color="#c04365" timeScale="1ms"/>
            <Line id="IT_L5B[21]: v" quantity="IT_L5B/21/CELL_IT/v" scale="1mV" color="#429521" timeScale="1ms"/>
            <Line id="IT_L5B[22]: v" quantity="IT_L5B/22/CELL_IT/v" scale="1mV" color="#5771a1" timeScale="1ms"/>
            <Line id="IT_L5B[23]: v" quantity="IT_L5B/23/CELL_IT/v" scale="1mV" color="#a92901" timeScale="1ms"/>
            <Line id="IT_L5B[24]: v" quantity="IT_L5B/24/CELL_IT/v" scale="1mV" color="#c79227" timeScale="1ms"/>
            <Line id="IT_L5B[25]: v" quantity="IT_L5B/25/CELL_IT/v" scale="1mV" color="#be071a" timeScale="1ms"/>
            <Line id="IT_L5B[26]: v" quantity="IT_L5B/26/CELL_IT/v" scale="1mV" color="#48b561" timeScale="1ms"/>
            <Line id="IT_L5B[27]: v" quantity="IT_L5B/27/CELL_IT/v" scale="1mV" color="#1c6bd2" timeScale="1ms"/>
            <Line id="IT_L5B[28]: v" quantity="IT_L5B/28/CELL_IT/v" scale="1mV" color="#75c9a7" timeScale="1ms"/>
            <Line id="IT_L5B[29]: v" quantity="IT_L5B/29/CELL_IT/v" scale="1mV" color="#37dec1" timeScale="1ms"/>
            <Line id="IT_L5B[30]: v" quantity="IT_L5B/30/CELL_IT/v" scale="1mV" color="#eb273b" timeScale="1ms"/>
            <Line id="IT_L5B[31]: v" quantity="IT_L5B/31/CELL_IT/v" scale="1mV" color="#007573" timeScale="1ms"/>
            <Line id="IT_L5B[32]: v" quantity="IT_L5B/32/CELL_IT/v" scale="1mV" color="#a0dcd5" timeScale="1ms"/>
        </Display>

        <Display id="DispPop__PT_L5B" title="Membrane potentials of cells in PT_L5B" timeScale="1ms" xmin="-10.0" xmax="110.0" ymin="-90" ymax="50">
            <Line id="PT_L5B[0]: v" quantity="PT_L5B/0/CELL_PT/v" scale="1mV" color="#ecd313" timeScale="1ms"/>
            <Line id="PT_L5B[1]: v" quantity="PT_L5B/1/CELL_PT/v" scale="1mV" color="#8836c5" timeScale="1ms"/>
            <Line id="PT_L5B[2]: v" quantity="PT_L5B/2/CELL_PT/v" scale="1mV" color="#b40115" timeScale="1ms"/>
            <Line id="PT_L5B[3]: v" quantity="PT_L5B/3/CELL_PT/v" scale="1mV" color="#7b6fc4" timeScale="1ms"/>
            <Line id="PT_L5B[4]: v" quantity="PT_L5B/4/CELL_PT/v" scale="1mV" color="#b0c8b5" timeScale="1ms"/>
            <Line id="PT_L5B[5]: v" quantity="PT_L5B/5/CELL_PT/v" scale="1mV" color="#323e0e" timeScale="1ms"/>
            <Line id="PT_L5B[6]: v" quantity="PT_L5B/6/CELL_PT/v" scale="1mV" color="#3df847" timeScale="1ms"/>
            <Line id="PT_L5B[7]: v" quantity="PT_L5B/7/CELL_PT/v" scale="1mV" color="#56baae" timeScale="1ms"/>
            <Line id="PT_L5B[8]: v" quantity="PT_L5B/8/CELL_PT/v" scale="1mV" color="#ead2ea" timeScale="1ms"/>
            <Line id="PT_L5B[9]: v" quantity="PT_L5B/9/CELL_PT/v" scale="1mV" color="#da018e" timeScale="1ms"/>
            <Line id="PT_L5B[10]: v" quantity="PT_L5B/10/CELL_PT/v" scale="1mV" color="#c01257" timeScale="1ms"/>
            <Line id="PT_L5B[11]: v" quantity="PT_L5B/11/CELL_PT/v" scale="1mV" color="#4b3d5c" timeScale="1ms"/>
            <Line id="PT_L5B[12]: v" quantity="PT_L5B/12/CELL_PT/v" scale="1mV" color="#c50ceb" timeScale="1ms"/>
            <Line id="PT_L5B[13]: v" quantity="PT_L5B/13/CELL_PT/v" scale="1mV" color="#625aa2" timeScale="1ms"/>
            <Line id="PT_L5B[14]: v" quantity="PT_L5B/14/CELL_PT/v" scale="1mV" color="#07e40b" timeScale="1ms"/>
            <Line id="PT_L5B[15]: v" quantity="PT_L5B/15/CELL_PT/v" scale="1mV" color="#08be70" timeScale="1ms"/>
            <Line id="PT_L5B[16]: v" quantity="PT_L5B/16/CELL_PT/v" scale="1mV" color="#78bc5c" timeScale="1ms"/>
            <Line id="PT_L5B[17]: v" quantity="PT_L5B/17/CELL_PT/v" scale="1mV" color="#3e3d45" timeScale="1ms"/>
            <Line id="PT_L5B[18]: v" quantity="PT_L5B/18/CELL_PT/v" scale="1mV" color="#90e191" timeScale="1ms"/>
            <Line id="PT_L5B[19]: v" quantity="PT_L5B/19/CELL_PT/v" scale="1mV" color="#ed30b6" timeScale="1ms"/>
            <Line id="PT_L5B[20]: v" quantity="PT_L5B/20/CELL_PT/v" scale="1mV" color="#c2e31f" timeScale="1ms"/>
            <Line id="PT_L5B[21]: v" quantity="PT_L5B/21/CELL_PT/v" scale="1mV" color="#e3952d" timeScale="1ms"/>
            <Line id="PT_L5B[22]: v" quantity="PT_L5B/22/CELL_PT/v" scale="1mV" color="#9289c9" timeScale="1ms"/>
            <Line id="PT_L5B[23]: v" quantity="PT_L5B/23/CELL_PT/v" scale="1mV" color="#d250ae" timeScale="1ms"/>
            <Line id="PT_L5B[24]: v" quantity="PT_L5B/24/CELL_PT/v" scale="1mV" color="#22b7ff" timeScale="1ms"/>
            <Line id="PT_L5B[25]: v" quantity="PT_L5B/25/CELL_PT/v" scale="1mV" color="#1c3313" timeScale="1ms"/>
            <Line id="PT_L5B[26]: v" quantity="PT_L5B/26/CELL_PT/v" scale="1mV" color="#06d4d0" timeScale="1ms"/>
            <Line id="PT_L5B[27]: v" quantity="PT_L5B/27/CELL_PT/v" scale="1mV" color="#3e69d7" timeScale="1ms"/>
            <Line id="PT_L5B[28]: v" quantity="PT_L5B/28/CELL_PT/v" scale="1mV" color="#96228b" timeScale="1ms"/>
            <Line id="PT_L5B[29]: v" quantity="PT_L5B/29/CELL_PT/v" scale="1mV" color="#e3ea24" timeScale="1ms"/>
            <Line id="PT_L5B[30]: v" quantity="PT_L5B/30/CELL_PT/v" scale="1mV" color="#08f9b9" timeScale="1ms"/>
            <Line id="PT_L5B[31]: v" quantity="PT_L5B/31/CELL_PT/v" scale="1mV" color="#2ec7aa" timeScale="1ms"/>
            <Line id="PT_L5B[32]: v" quantity="PT_L5B/32/CELL_PT/v" scale="1mV" color="#34c712" timeScale="1ms"/>
        </Display>

        <Display id="DispPop__IT_L6" title="Membrane potentials of cells in IT_L6" timeScale="1ms" xmin="-10.0" xmax="110.0" ymin="-90" ymax="50">
            <Line id="IT_L6[0]: v" quantity="IT_L6/0/CELL_IT/v" scale="1mV" color="#a660ab" timeScale="1ms"/>
            <Line id="IT_L6[1]: v" quantity="IT_L6/1/CELL_IT/v" scale="1mV" color="#62986f" timeScale="1ms"/>
            <Line id="IT_L6[2]: v" quantity="IT_L6/2/CELL_IT/v" scale="1mV" color="#1bda97" timeScale="1ms"/>
            <Line id="IT_L6[3]: v" quantity="IT_L6/3/CELL_IT/v" scale="1mV" color="#e08da0" timeScale="1ms"/>
            <Line id="IT_L6[4]: v" quantity="IT_L6/4/CELL_IT/v" scale="1mV" color="#0e2688" timeScale="1ms"/>
            <Line id="IT_L6[5]: v" quantity="IT_L6/5/CELL_IT/v" scale="1mV" color="#bce01e" timeScale="1ms"/>
            <Line id="IT_L6[6]: v" quantity="IT_L6/6/CELL_IT/v" scale="1mV" color="#aa1ec0" timeScale="1ms"/>
            <Line id="IT_L6[7]: v" quantity="IT_L6/7/CELL_IT/v" scale="1mV" color="#fcc1dd" timeScale="1ms"/>
            <Line id="IT_L6[8]: v" quantity="IT_L6/8/CELL_IT/v" scale="1mV" color="#64cc17" timeScale="1ms"/>
            <Line id="IT_L6[9]: v" quantity="IT_L6/9/CELL_IT/v" scale="1mV" color="#6fc1b4" timeScale="1ms"/>
            <Line id="IT_L6[10]: v" quantity="IT_L6/10/CELL_IT/v" scale="1mV" color="#e2af6a" timeScale="1ms"/>
            <Line id="IT_L6[11]: v" quantity="IT_L6/11/CELL_IT/v" scale="1mV" color="#27d713" timeScale="1ms"/>
            <Line id="IT_L6[12]: v" quantity="IT_L6/12/CELL_IT/v" scale="1mV" color="#27a47d" timeScale="1ms"/>
            <Line id="IT_L6[13]: v" quantity="IT_L6/13/CELL_IT/v" scale="1mV" color="#b22e31" timeScale="1ms"/>
            <Line id="IT_L6[14]: v" quantity="IT_L6/14/CELL_IT/v" scale="1mV" color="#2e55ea" timeScale="1ms"/>
            <Line id="IT_L6[15]: v" quantity="IT_L6/15/CELL_IT/v" scale="1mV" color="#e1fb0b" timeScale="1ms"/>
            <Line id="IT_L6[16]: v" quantity="IT_L6/16/CELL_IT/v" scale="1mV" color="#c9db10" timeScale="1ms"/>
            <Line id="IT_L6[17]: v" quantity="IT_L6/17/CELL_IT/v" scale="1mV" color="#1624c5" timeScale="1ms"/>
            <Line id="IT_L6[18]: v" quantity="IT_L6/18/CELL_IT/v" scale="1mV" color="#5ce098" timeScale="1ms"/>
            <Line id="IT_L6[19]: v" quantity="IT_L6/19/CELL_IT/v" scale="1mV" color="#6b5a35" timeScale="1ms"/>
            <Line id="IT_L6[20]: v" quantity="IT_L6/20/CELL_IT/v" scale="1mV" color="#cd9ac9" timeScale="1ms"/>
            <Line id="IT_L6[21]: v" quantity="IT_L6/21/CELL_IT/v" scale="1mV" color="#f86b5f" timeScale="1ms"/>
            <Line id="IT_L6[22]: v" quantity="IT_L6/22/CELL_IT/v" scale="1mV" color="#934ec1" timeScale="1ms"/>
            <Line id="IT_L6[23]: v" quantity="IT_L6/23/CELL_IT/v" scale="1mV" color="#715136" timeScale="1ms"/>
            <Line id="IT_L6[24]: v" quantity="IT_L6/24/CELL_IT/v" scale="1mV" color="#f72387" timeScale="1ms"/>
            <Line id="IT_L6[25]: v" quantity="IT_L6/25/CELL_IT/v" scale="1mV" color="#ca21e6" timeScale="1ms"/>
            <Line id="IT_L6[26]: v" quantity="IT_L6/26/CELL_IT/v" scale="1mV" color="#64a7ec" timeScale="1ms"/>
            <Line id="IT_L6[27]: v" quantity="IT_L6/27/CELL_IT/v" scale="1mV" color="#deb8e8" timeScale="1ms"/>
            <Line id="IT_L6[28]: v" quantity="IT_L6/28/CELL_IT/v" scale="1mV" color="#cf25cd" timeScale="1ms"/>
            <Line id="IT_L6[29]: v" quantity="IT_L6/29/CELL_IT/v" scale="1mV" color="#677c80" timeScale="1ms"/>
            <Line id="IT_L6[30]: v" quantity="IT_L6/30/CELL_IT/v" scale="1mV" color="#cfac99" timeScale="1ms"/>
        </Display>

        <Display id="DispPop__CT_L6" title="Membrane potentials of cells in CT_L6" timeScale="1ms" xmin="-10.0" xmax="110.0" ymin="-90" ymax="50">
            <Line id="CT_L6[0]: v" quantity="CT_L6/0/CELL_CT/v" scale="1mV" color="#f1d0cb" timeScale="1ms"/>
            <Line id="CT_L6[1]: v" quantity="CT_L6/1/CELL_CT/v" scale="1mV" color="#df43a0" timeScale="1ms"/>
            <Line id="CT_L6[2]: v" quantity="CT_L6/2/CELL_CT/v" scale="1mV" color="#25061b" timeScale="1ms"/>
            <Line id="CT_L6[3]: v" quantity="CT_L6/3/CELL_CT/v" scale="1mV" color="#0f4c94" timeScale="1ms"/>
            <Line id="CT_L6[4]: v" quantity="CT_L6/4/CELL_CT/v" scale="1mV" color="#881d02" timeScale="1ms"/>
            <Line id="CT_L6[5]: v" quantity="CT_L6/5/CELL_CT/v" scale="1mV" color="#106ddb" timeScale="1ms"/>
            <Line id="CT_L6[6]: v" quantity="CT_L6/6/CELL_CT/v" scale="1mV" color="#a44605" timeScale="1ms"/>
            <Line id="CT_L6[7]: v" quantity="CT_L6/7/CELL_CT/v" scale="1mV" color="#568403" timeScale="1ms"/>
            <Line id="CT_L6[8]: v" quantity="CT_L6/8/CELL_CT/v" scale="1mV" color="#94039d" timeScale="1ms"/>
            <Line id="CT_L6[9]: v" quantity="CT_L6/9/CELL_CT/v" scale="1mV" color="#0dbf49" timeScale="1ms"/>
            <Line id="CT_L6[10]: v" quantity="CT_L6/10/CELL_CT/v" scale="1mV" color="#e919eb" timeScale="1ms"/>
            <Line id="CT_L6[11]: v" quantity="CT_L6/11/CELL_CT/v" scale="1mV" color="#ef7266" timeScale="1ms"/>
            <Line id="CT_L6[12]: v" quantity="CT_L6/12/CELL_CT/v" scale="1mV" color="#0fbe7f" timeScale="1ms"/>
            <Line id="CT_L6[13]: v" quantity="CT_L6/13/CELL_CT/v" scale="1mV" color="#aa478c" timeScale="1ms"/>
            <Line id="CT_L6[14]: v" quantity="CT_L6/14/CELL_CT/v" scale="1mV" color="#7bfc6f" timeScale="1ms"/>
            <Line id="CT_L6[15]: v" quantity="CT_L6/15/CELL_CT/v" scale="1mV" color="#c52b0c" timeScale="1ms"/>
            <Line id="CT_L6[16]: v" quantity="CT_L6/16/CELL_CT/v" scale="1mV" color="#0400d6" timeScale="1ms"/>
            <Line id="CT_L6[17]: v" quantity="CT_L6/17/CELL_CT/v" scale="1mV" color="#d8d6f8" timeScale="1ms"/>
            <Line id="CT_L6[18]: v" quantity="CT_L6/18/CELL_CT/v" scale="1mV" color="#c6b4bb" timeScale="1ms"/>
            <Line id="CT_L6[19]: v" quantity="CT_L6/19/CELL_CT/v" scale="1mV" color="#acb76b" timeScale="1ms"/>
            <Line id="CT_L6[20]: v" quantity="CT_L6/20/CELL_CT/v" scale="1mV" color="#931260" timeScale="1ms"/>
            <Line id="CT_L6[21]: v" quantity="CT_L6/21/CELL_CT/v" scale="1mV" color="#9aebe5" timeScale="1ms"/>
            <Line id="CT_L6[22]: v" quantity="CT_L6/22/CELL_CT/v" scale="1mV" color="#e7a568" timeScale="1ms"/>
            <Line id="CT_L6[23]: v" quantity="CT_L6/23/CELL_CT/v" scale="1mV" color="#8838a8" timeScale="1ms"/>
            <Line id="CT_L6[24]: v" quantity="CT_L6/24/CELL_CT/v" scale="1mV" color="#47d149" timeScale="1ms"/>
            <Line id="CT_L6[25]: v" quantity="CT_L6/25/CELL_CT/v" scale="1mV" color="#ff6aac" timeScale="1ms"/>
            <Line id="CT_L6[26]: v" quantity="CT_L6/26/CELL_CT/v" scale="1mV" color="#d57bbd" timeScale="1ms"/>
            <Line id="CT_L6[27]: v" quantity="CT_L6/27/CELL_CT/v" scale="1mV" color="#33ffc4" timeScale="1ms"/>
            <Line id="CT_L6[28]: v" quantity="CT_L6/28/CELL_CT/v" scale="1mV" color="#62a047" timeScale="1ms"/>
            <Line id="CT_L6[29]: v" quantity="CT_L6/29/CELL_CT/v" scale="1mV" color="#eeec1d" timeScale="1ms"/>
            <Line id="CT_L6[30]: v" quantity="CT_L6/30/CELL_CT/v" scale="1mV" color="#3c1524" timeScale="1ms"/>
        </Display>

        <Display id="DispPop__PV_L23" title="Membrane potentials of cells in PV_L23" timeScale="1ms" xmin="-10.0" xmax="110.0" ymin="-90" ymax="50">
            <Line id="PV_L23[0]: v" quantity="PV_L23/0/CELL_PV/v" scale="1mV" color="#681b30" timeScale="1ms"/>
            <Line id="PV_L23[1]: v" quantity="PV_L23/1/CELL_PV/v" scale="1mV" color="#939add" timeScale="1ms"/>
            <Line id="PV_L23[2]: v" quantity="PV_L23/2/CELL_PV/v" scale="1mV" color="#46e163" timeScale="1ms"/>
            <Line id="PV_L23[3]: v" quantity="PV_L23/3/CELL_PV/v" scale="1mV" color="#7b7432" timeScale="1ms"/>
            <Line id="PV_L23[4]: v" quantity="PV_L23/4/CELL_PV/v" scale="1mV" color="#d067fb" timeScale="1ms"/>
            <Line id="PV_L23[5]: v" quantity="PV_L23/5/CELL_PV/v" scale="1mV" color="#c4ee23" timeScale="1ms"/>
            <Line id="PV_L23[6]: v" quantity="PV_L23/6/CELL_PV/v" scale="1mV" color="#7b9c20" timeScale="1ms"/>
        </Display>

        <Display id="DispPop__SOM_L23" title="Membrane potentials of cells in SOM_L23" timeScale="1ms" xmin="-10.0" xmax="110.0" ymin="-90" ymax="50">
            <Line id="SOM_L23[0]: v" quantity="SOM_L23/0/CELL_SOM/v" scale="1mV" color="#37cc64" timeScale="1ms"/>
            <Line id="SOM_L23[1]: v" quantity="SOM_L23/1/CELL_SOM/v" scale="1mV" color="#0a12ed" timeScale="1ms"/>
            <Line id="SOM_L23[2]: v" quantity="SOM_L23/2/CELL_SOM/v" scale="1mV" color="#18f3c9" timeScale="1ms"/>
            <Line id="SOM_L23[3]: v" quantity="SOM_L23/3/CELL_SOM/v" scale="1mV" color="#98fcf9" timeScale="1ms"/>
            <Line id="SOM_L23[4]: v" quantity="SOM_L23/4/CELL_SOM/v" scale="1mV" color="#043d43" timeScale="1ms"/>
            <Line id="SOM_L23[5]: v" quantity="SOM_L23/5/CELL_SOM/v" scale="1mV" color="#c080cd" timeScale="1ms"/>
            <Line id="SOM_L23[6]: v" quantity="SOM_L23/6/CELL_SOM/v" scale="1mV" color="#f97d8c" timeScale="1ms"/>
        </Display>

        <Display id="DispPop__PV_L5" title="Membrane potentials of cells in PV_L5" timeScale="1ms" xmin="-10.0" xmax="110.0" ymin="-90" ymax="50">
            <Line id="PV_L5[0]: v" quantity="PV_L5/0/CELL_PV/v" scale="1mV" color="#e993be" timeScale="1ms"/>
            <Line id="PV_L5[1]: v" quantity="PV_L5/1/CELL_PV/v" scale="1mV" color="#13b947" timeScale="1ms"/>
            <Line id="PV_L5[2]: v" quantity="PV_L5/2/CELL_PV/v" scale="1mV" color="#8cd414" timeScale="1ms"/>
            <Line id="PV_L5[3]: v" quantity="PV_L5/3/CELL_PV/v" scale="1mV" color="#ee74d4" timeScale="1ms"/>
            <Line id="PV_L5[4]: v" quantity="PV_L5/4/CELL_PV/v" scale="1mV" color="#54de5f" timeScale="1ms"/>
            <Line id="PV_L5[5]: v" quantity="PV_L5/5/CELL_PV/v" scale="1mV" color="#492cfc" timeScale="1ms"/>
            <Line id="PV_L5[6]: v" quantity="PV_L5/6/CELL_PV/v" scale="1mV" color="#efd42e" timeScale="1ms"/>
            <Line id="PV_L5[7]: v" quantity="PV_L5/7/CELL_PV/v" scale="1mV" color="#d2a722" timeScale="1ms"/>
            <Line id="PV_L5[8]: v" quantity="PV_L5/8/CELL_PV/v" scale="1mV" color="#ebe936" timeScale="1ms"/>
            <Line id="PV_L5[9]: v" quantity="PV_L5/9/CELL_PV/v" scale="1mV" color="#289cfb" timeScale="1ms"/>
            <Line id="PV_L5[10]: v" quantity="PV_L5/10/CELL_PV/v" scale="1mV" color="#7804e7" timeScale="1ms"/>
            <Line id="PV_L5[11]: v" quantity="PV_L5/11/CELL_PV/v" scale="1mV" color="#29306b" timeScale="1ms"/>
            <Line id="PV_L5[12]: v" quantity="PV_L5/12/CELL_PV/v" scale="1mV" color="#6deec8" timeScale="1ms"/>
            <Line id="PV_L5[13]: v" quantity="PV_L5/13/CELL_PV/v" scale="1mV" color="#ad2faf" timeScale="1ms"/>
            <Line id="PV_L5[14]: v" quantity="PV_L5/14/CELL_PV/v" scale="1mV" color="#f09e50" timeScale="1ms"/>
        </Display>

        <Display id="DispPop__SOM_L5" title="Membrane potentials of cells in SOM_L5" timeScale="1ms" xmin="-10.0" xmax="110.0" ymin="-90" ymax="50">
            <Line id="SOM_L5[0]: v" quantity="SOM_L5/0/CELL_SOM/v" scale="1mV" color="#d7e958" timeScale="1ms"/>
            <Line id="SOM_L5[1]: v" quantity="SOM_L5/1/CELL_SOM/v" scale="1mV" color="#749b9d" timeScale="1ms"/>
            <Line id="SOM_L5[2]: v" quantity="SOM_L5/2/CELL_SOM/v" scale="1mV" color="#8acae8" timeScale="1ms"/>
            <Line id="SOM_L5[3]: v" quantity="SOM_L5/3/CELL_SOM/v" scale="1mV" color="#efb430" timeScale="1ms"/>
            <Line id="SOM_L5[4]: v" quantity="SOM_L5/4/CELL_SOM/v" scale="1mV" color="#5dda1c" timeScale="1ms"/>
            <Line id="SOM_L5[5]: v" quantity="SOM_L5/5/CELL_SOM/v" scale="1mV" color="#35110d" timeScale="1ms"/>
            <Line id="SOM_L5[6]: v" quantity="SOM_L5/6/CELL_SOM/v" scale="1mV" color="#3a3ac2" timeScale="1ms"/>
            <Line id="SOM_L5[7]: v" quantity="SOM_L5/7/CELL_SOM/v" scale="1mV" color="#12a05d" timeScale="1ms"/>
            <Line id="SOM_L5[8]: v" quantity="SOM_L5/8/CELL_SOM/v" scale="1mV" color="#3aad13" timeScale="1ms"/>
            <Line id="SOM_L5[9]: v" quantity="SOM_L5/9/CELL_SOM/v" scale="1mV" color="#9dfd18" timeScale="1ms"/>
            <Line id="SOM_L5[10]: v" quantity="SOM_L5/10/CELL_SOM/v" scale="1mV" color="#af7557" timeScale="1ms"/>
            <Line id="SOM_L5[11]: v" quantity="SOM_L5/11/CELL_SOM/v" scale="1mV" color="#de027a" timeScale="1ms"/>
            <Line id="SOM_L5[12]: v" quantity="SOM_L5/12/CELL_SOM/v" scale="1mV" color="#3b3ab4" timeScale="1ms"/>
            <Line id="SOM_L5[13]: v" quantity="SOM_L5/13/CELL_SOM/v" scale="1mV" color="#7c5ff8" timeScale="1ms"/>
            <Line id="SOM_L5[14]: v" quantity="SOM_L5/14/CELL_SOM/v" scale="1mV" color="#95ee2a" timeScale="1ms"/>
        </Display>

        <Display id="DispPop__PV_L6" title="Membrane potentials of cells in PV_L6" timeScale="1ms" xmin="-10.0" xmax="110.0" ymin="-90" ymax="50">
            <Line id="PV_L6[0]: v" quantity="PV_L6/0/CELL_PV/v" scale="1mV" color="#62ca00" timeScale="1ms"/>
            <Line id="PV_L6[1]: v" quantity="PV_L6/1/CELL_PV/v" scale="1mV" color="#e74ca9" timeScale="1ms"/>
            <Line id="PV_L6[2]: v" quantity="PV_L6/2/CELL_PV/v" scale="1mV" color="#d631b0" timeScale="1ms"/>
            <Line id="PV_L6[3]: v" quantity="PV_L6/3/CELL_PV/v" scale="1mV" color="#bfbacd" timeScale="1ms"/>
            <Line id="PV_L6[4]: v" quantity="PV_L6/4/CELL_PV/v" scale="1mV" color="#c17b03" timeScale="1ms"/>
            <Line id="PV_L6[5]: v" quantity="PV_L6/5/CELL_PV/v" scale="1mV" color="#25a2f9" timeScale="1ms"/>
            <Line id="PV_L6[6]: v" quantity="PV_L6/6/CELL_PV/v" scale="1mV" color="#a083e4" timeScale="1ms"/>
        </Display>

        <Display id="DispPop__SOM_L6" title="Membrane potentials of cells in SOM_L6" timeScale="1ms" xmin="-10.0" xmax="110.0" ymin="-90" ymax="50">
            <Line id="SOM_L6[0]: v" quantity="SOM_L6/0/CELL_SOM/v" scale="1mV" color="#afb15a" timeScale="1ms"/>
            <Line id="SOM_L6[1]: v" quantity="SOM_L6/1/CELL_SOM/v" scale="1mV" color="#915eaa" timeScale="1ms"/>
            <Line id="SOM_L6[2]: v" quantity="SOM_L6/2/CELL_SOM/v" scale="1mV" color="#eea4d3" timeScale="1ms"/>
            <Line id="SOM_L6[3]: v" quantity="SOM_L6/3/CELL_SOM/v" scale="1mV" color="#9057e7" timeScale="1ms"/>
            <Line id="SOM_L6[4]: v" quantity="SOM_L6/4/CELL_SOM/v" scale="1mV" color="#c5af85" timeScale="1ms"/>
            <Line id="SOM_L6[5]: v" quantity="SOM_L6/5/CELL_SOM/v" scale="1mV" color="#d42227" timeScale="1ms"/>
            <Line id="SOM_L6[6]: v" quantity="SOM_L6/6/CELL_SOM/v" scale="1mV" color="#c4232a" timeScale="1ms"/>
        </Display>

        <OutputFile id="Volts_file__IT_L23" fileName="Sim_M1.IT_L23.v.dat">
            <OutputColumn id="v_IT_L23_0_CELL_IT_v" quantity="IT_L23/0/CELL_IT/v"/>
            <OutputColumn id="v_IT_L23_1_CELL_IT_v" quantity="IT_L23/1/CELL_IT/v"/>
            <OutputColumn id="v_IT_L23_2_CELL_IT_v" quantity="IT_L23/2/CELL_IT/v"/>
            <OutputColumn id="v_IT_L23_3_CELL_IT_v" quantity="IT_L23/3/CELL_IT/v"/>
            <OutputColumn id="v_IT_L23_4_CELL_IT_v" quantity="IT_L23/4/CELL_IT/v"/>
            <OutputColumn id="v_IT_L23_5_CELL_IT_v" quantity="IT_L23/5/CELL_IT/v"/>
            <OutputColumn id="v_IT_L23_6_CELL_IT_v" quantity="IT_L23/6/CELL_IT/v"/>
            <OutputColumn id="v_IT_L23_7_CELL_IT_v" quantity="IT_L23/7/CELL_IT/v"/>
            <OutputColumn id="v_IT_L23_8_CELL_IT_v" quantity="IT_L23/8/CELL_IT/v"/>
            <OutputColumn id="v_IT_L23_9_CELL_IT_v" quantity="IT_L23/9/CELL_IT/v"/>
            <OutputColumn id="v_IT_L23_10_CELL_IT_v" quantity="IT_L23/10/CELL_IT/v"/>
            <OutputColumn id="v_IT_L23_11_CELL_IT_v" quantity="IT_L23/11/CELL_IT/v"/>
            <OutputColumn id="v_IT_L23_12_CELL_IT_v" quantity="IT_L23/12/CELL_IT/v"/>
            <OutputColumn id="v_IT_L23_13_CELL_IT_v" quantity="IT_L23/13/CELL_IT/v"/>
            <OutputColumn id="v_IT_L23_14_CELL_IT_v" quantity="IT_L23/14/CELL_IT/v"/>
            <OutputColumn id="v_IT_L23_15_CELL_IT_v" quantity="IT_L23/15/CELL_IT/v"/>
            <OutputColumn id="v_IT_L23_16_CELL_IT_v" quantity="IT_L23/16/CELL_IT/v"/>
            <OutputColumn id="v_IT_L23_17_CELL_IT_v" quantity="IT_L23/17/CELL_IT/v"/>
            <OutputColumn id="v_IT_L23_18_CELL_IT_v" quantity="IT_L23/18/CELL_IT/v"/>
            <OutputColumn id="v_IT_L23_19_CELL_IT_v" quantity="IT_L23/19/CELL_IT/v"/>
            <OutputColumn id="v_IT_L23_20_CELL_IT_v" quantity="IT_L23/20/CELL_IT/v"/>
            <OutputColumn id="v_IT_L23_21_CELL_IT_v" quantity="IT_L23/21/CELL_IT/v"/>
            <OutputColumn id="v_IT_L23_22_CELL_IT_v" quantity="IT_L23/22/CELL_IT/v"/>
            <OutputColumn id="v_IT_L23_23_CELL_IT_v" quantity="IT_L23/23/CELL_IT/v"/>
            <OutputColumn id="v_IT_L23_24_CELL_IT_v" quantity="IT_L23/24/CELL_IT/v"/>
            <OutputColumn id="v_IT_L23_25_CELL_IT_v" quantity="IT_L23/25/CELL_IT/v"/>
            <OutputColumn id="v_IT_L23_26_CELL_IT_v" quantity="IT_L23/26/CELL_IT/v"/>
            <OutputColumn id="v_IT_L23_27_CELL_IT_v" quantity="IT_L23/27/CELL_IT/v"/>
            <OutputColumn id="v_IT_L23_28_CELL_IT_v" quantity="IT_L23/28/CELL_IT/v"/>
            <OutputColumn id="v_IT_L23_29_CELL_IT_v" quantity="IT_L23/29/CELL_IT/v"/>
            <OutputColumn id="v_IT_L23_30_CELL_IT_v" quantity="IT_L23/30/CELL_IT/v"/>
            <OutputColumn id="v_IT_L23_31_CELL_IT_v" quantity="IT_L23/31/CELL_IT/v"/>
            <OutputColumn id="v_IT_L23_32_CELL_IT_v" quantity="IT_L23/32/CELL_IT/v"/>
            <OutputColumn id="v_IT_L23_33_CELL_IT_v" quantity="IT_L23/33/CELL_IT/v"/>
            <OutputColumn id="v_IT_L23_34_CELL_IT_v" quantity="IT_L23/34/CELL_IT/v"/>
            <OutputColumn id="v_IT_L23_35_CELL_IT_v" quantity="IT_L23/35/CELL_IT/v"/>
            <OutputColumn id="v_IT_L23_36_CELL_IT_v" quantity="IT_L23/36/CELL_IT/v"/>
            <OutputColumn id="v_IT_L23_37_CELL_IT_v" quantity="IT_L23/37/CELL_IT/v"/>
            <OutputColumn id="v_IT_L23_38_CELL_IT_v" quantity="IT_L23/38/CELL_IT/v"/>
            <OutputColumn id="v_IT_L23_39_CELL_IT_v" quantity="IT_L23/39/CELL_IT/v"/>
            <OutputColumn id="v_IT_L23_40_CELL_IT_v" quantity="IT_L23/40/CELL_IT/v"/>
            <OutputColumn id="v_IT_L23_41_CELL_IT_v" quantity="IT_L23/41/CELL_IT/v"/>
            <OutputColumn id="v_IT_L23_42_CELL_IT_v" quantity="IT_L23/42/CELL_IT/v"/>
            <OutputColumn id="v_IT_L23_43_CELL_IT_v" quantity="IT_L23/43/CELL_IT/v"/>
            <OutputColumn id="v_IT_L23_44_CELL_IT_v" quantity="IT_L23/44/CELL_IT/v"/>
            <OutputColumn id="v_IT_L23_45_CELL_IT_v" quantity="IT_L23/45/CELL_IT/v"/>
            <OutputColumn id="v_IT_L23_46_CELL_IT_v" quantity="IT_L23/46/CELL_IT/v"/>
            <OutputColumn id="v_IT_L23_47_CELL_IT_v" quantity="IT_L23/47/CELL_IT/v"/>
            <OutputColumn id="v_IT_L23_48_CELL_IT_v" quantity="IT_L23/48/CELL_IT/v"/>
            <OutputColumn id="v_IT_L23_49_CELL_IT_v" quantity="IT_L23/49/CELL_IT/v"/>
            <OutputColumn id="v_IT_L23_50_CELL_IT_v" quantity="IT_L23/50/CELL_IT/v"/>
        </OutputFile>

        <OutputFile id="Volts_file__IT_L4" fileName="Sim_M1.IT_L4.v.dat">
            <OutputColumn id="v_IT_L4_0_CELL_IT_v" quantity="IT_L4/0/CELL_IT/v"/>
            <OutputColumn id="v_IT_L4_1_CELL_IT_v" quantity="IT_L4/1/CELL_IT/v"/>
            <OutputColumn id="v_IT_L4_2_CELL_IT_v" quantity="IT_L4/2/CELL_IT/v"/>
            <OutputColumn id="v_IT_L4_3_CELL_IT_v" quantity="IT_L4/3/CELL_IT/v"/>
            <OutputColumn id="v_IT_L4_4_CELL_IT_v" quantity="IT_L4/4/CELL_IT/v"/>
            <OutputColumn id="v_IT_L4_5_CELL_IT_v" quantity="IT_L4/5/CELL_IT/v"/>
            <OutputColumn id="v_IT_L4_6_CELL_IT_v" quantity="IT_L4/6/CELL_IT/v"/>
            <OutputColumn id="v_IT_L4_7_CELL_IT_v" quantity="IT_L4/7/CELL_IT/v"/>
            <OutputColumn id="v_IT_L4_8_CELL_IT_v" quantity="IT_L4/8/CELL_IT/v"/>
            <OutputColumn id="v_IT_L4_9_CELL_IT_v" quantity="IT_L4/9/CELL_IT/v"/>
            <OutputColumn id="v_IT_L4_10_CELL_IT_v" quantity="IT_L4/10/CELL_IT/v"/>
            <OutputColumn id="v_IT_L4_11_CELL_IT_v" quantity="IT_L4/11/CELL_IT/v"/>
            <OutputColumn id="v_IT_L4_12_CELL_IT_v" quantity="IT_L4/12/CELL_IT/v"/>
            <OutputColumn id="v_IT_L4_13_CELL_IT_v" quantity="IT_L4/13/CELL_IT/v"/>
            <OutputColumn id="v_IT_L4_14_CELL_IT_v" quantity="IT_L4/14/CELL_IT/v"/>
            <OutputColumn id="v_IT_L4_15_CELL_IT_v" quantity="IT_L4/15/CELL_IT/v"/>
            <OutputColumn id="v_IT_L4_16_CELL_IT_v" quantity="IT_L4/16/CELL_IT/v"/>
            <OutputColumn id="v_IT_L4_17_CELL_IT_v" quantity="IT_L4/17/CELL_IT/v"/>
            <OutputColumn id="v_IT_L4_18_CELL_IT_v" quantity="IT_L4/18/CELL_IT/v"/>
            <OutputColumn id="v_IT_L4_19_CELL_IT_v" quantity="IT_L4/19/CELL_IT/v"/>
            <OutputColumn id="v_IT_L4_20_CELL_IT_v" quantity="IT_L4/20/CELL_IT/v"/>
            <OutputColumn id="v_IT_L4_21_CELL_IT_v" quantity="IT_L4/21/CELL_IT/v"/>
            <OutputColumn id="v_IT_L4_22_CELL_IT_v" quantity="IT_L4/22/CELL_IT/v"/>
            <OutputColumn id="v_IT_L4_23_CELL_IT_v" quantity="IT_L4/23/CELL_IT/v"/>
            <OutputColumn id="v_IT_L4_24_CELL_IT_v" quantity="IT_L4/24/CELL_IT/v"/>
            <OutputColumn id="v_IT_L4_25_CELL_IT_v" quantity="IT_L4/25/CELL_IT/v"/>
        </OutputFile>

        <OutputFile id="Volts_file__IT_L5A" fileName="Sim_M1.IT_L5A.v.dat">
            <OutputColumn id="v_IT_L5A_0_CELL_IT_v" quantity="IT_L5A/0/CELL_IT/v"/>
            <OutputColumn id="v_IT_L5A_1_CELL_IT_v" quantity="IT_L5A/1/CELL_IT/v"/>
            <OutputColumn id="v_IT_L5A_2_CELL_IT_v" quantity="IT_L5A/2/CELL_IT/v"/>
            <OutputColumn id="v_IT_L5A_3_CELL_IT_v" quantity="IT_L5A/3/CELL_IT/v"/>
            <OutputColumn id="v_IT_L5A_4_CELL_IT_v" quantity="IT_L5A/4/CELL_IT/v"/>
            <OutputColumn id="v_IT_L5A_5_CELL_IT_v" quantity="IT_L5A/5/CELL_IT/v"/>
            <OutputColumn id="v_IT_L5A_6_CELL_IT_v" quantity="IT_L5A/6/CELL_IT/v"/>
            <OutputColumn id="v_IT_L5A_7_CELL_IT_v" quantity="IT_L5A/7/CELL_IT/v"/>
            <OutputColumn id="v_IT_L5A_8_CELL_IT_v" quantity="IT_L5A/8/CELL_IT/v"/>
            <OutputColumn id="v_IT_L5A_9_CELL_IT_v" quantity="IT_L5A/9/CELL_IT/v"/>
            <OutputColumn id="v_IT_L5A_10_CELL_IT_v" quantity="IT_L5A/10/CELL_IT/v"/>
            <OutputColumn id="v_IT_L5A_11_CELL_IT_v" quantity="IT_L5A/11/CELL_IT/v"/>
            <OutputColumn id="v_IT_L5A_12_CELL_IT_v" quantity="IT_L5A/12/CELL_IT/v"/>
            <OutputColumn id="v_IT_L5A_13_CELL_IT_v" quantity="IT_L5A/13/CELL_IT/v"/>
            <OutputColumn id="v_IT_L5A_14_CELL_IT_v" quantity="IT_L5A/14/CELL_IT/v"/>
            <OutputColumn id="v_IT_L5A_15_CELL_IT_v" quantity="IT_L5A/15/CELL_IT/v"/>
            <OutputColumn id="v_IT_L5A_16_CELL_IT_v" quantity="IT_L5A/16/CELL_IT/v"/>
            <OutputColumn id="v_IT_L5A_17_CELL_IT_v" quantity="IT_L5A/17/CELL_IT/v"/>
            <OutputColumn id="v_IT_L5A_18_CELL_IT_v" quantity="IT_L5A/18/CELL_IT/v"/>
            <OutputColumn id="v_IT_L5A_19_CELL_IT_v" quantity="IT_L5A/19/CELL_IT/v"/>
            <OutputColumn id="v_IT_L5A_20_CELL_IT_v" quantity="IT_L5A/20/CELL_IT/v"/>
            <OutputColumn id="v_IT_L5A_21_CELL_IT_v" quantity="IT_L5A/21/CELL_IT/v"/>
            <OutputColumn id="v_IT_L5A_22_CELL_IT_v" quantity="IT_L5A/22/CELL_IT/v"/>
            <OutputColumn id="v_IT_L5A_23_CELL_IT_v" quantity="IT_L5A/23/CELL_IT/v"/>
            <OutputColumn id="v_IT_L5A_24_CELL_IT_v" quantity="IT_L5A/24/CELL_IT/v"/>
            <OutputColumn id="v_IT_L5A_25_CELL_IT_v" quantity="IT_L5A/25/CELL_IT/v"/>
            <OutputColumn id="v_IT_L5A_26_CELL_IT_v" quantity="IT_L5A/26/CELL_IT/v"/>
            <OutputColumn id="v_IT_L5A_27_CELL_IT_v" quantity="IT_L5A/27/CELL_IT/v"/>
            <OutputColumn id="v_IT_L5A_28_CELL_IT_v" quantity="IT_L5A/28/CELL_IT/v"/>
        </OutputFile>

        <OutputFile id="Volts_file__IT_L5B" fileName="Sim_M1.IT_L5B.v.dat">
            <OutputColumn id="v_IT_L5B_0_CELL_IT_v" quantity="IT_L5B/0/CELL_IT/v"/>
            <OutputColumn id="v_IT_L5B_1_CELL_IT_v" quantity="IT_L5B/1/CELL_IT/v"/>
            <OutputColumn id="v_IT_L5B_2_CELL_IT_v" quantity="IT_L5B/2/CELL_IT/v"/>
            <OutputColumn id="v_IT_L5B_3_CELL_IT_v" quantity="IT_L5B/3/CELL_IT/v"/>
            <OutputColumn id="v_IT_L5B_4_CELL_IT_v" quantity="IT_L5B/4/CELL_IT/v"/>
            <OutputColumn id="v_IT_L5B_5_CELL_IT_v" quantity="IT_L5B/5/CELL_IT/v"/>
            <OutputColumn id="v_IT_L5B_6_CELL_IT_v" quantity="IT_L5B/6/CELL_IT/v"/>
            <OutputColumn id="v_IT_L5B_7_CELL_IT_v" quantity="IT_L5B/7/CELL_IT/v"/>
            <OutputColumn id="v_IT_L5B_8_CELL_IT_v" quantity="IT_L5B/8/CELL_IT/v"/>
            <OutputColumn id="v_IT_L5B_9_CELL_IT_v" quantity="IT_L5B/9/CELL_IT/v"/>
            <OutputColumn id="v_IT_L5B_10_CELL_IT_v" quantity="IT_L5B/10/CELL_IT/v"/>
            <OutputColumn id="v_IT_L5B_11_CELL_IT_v" quantity="IT_L5B/11/CELL_IT/v"/>
            <OutputColumn id="v_IT_L5B_12_CELL_IT_v" quantity="IT_L5B/12/CELL_IT/v"/>
            <OutputColumn id="v_IT_L5B_13_CELL_IT_v" quantity="IT_L5B/13/CELL_IT/v"/>
            <OutputColumn id="v_IT_L5B_14_CELL_IT_v" quantity="IT_L5B/14/CELL_IT/v"/>
            <OutputColumn id="v_IT_L5B_15_CELL_IT_v" quantity="IT_L5B/15/CELL_IT/v"/>
            <OutputColumn id="v_IT_L5B_16_CELL_IT_v" quantity="IT_L5B/16/CELL_IT/v"/>
            <OutputColumn id="v_IT_L5B_17_CELL_IT_v" quantity="IT_L5B/17/CELL_IT/v"/>
            <OutputColumn id="v_IT_L5B_18_CELL_IT_v" quantity="IT_L5B/18/CELL_IT/v"/>
            <OutputColumn id="v_IT_L5B_19_CELL_IT_v" quantity="IT_L5B/19/CELL_IT/v"/>
            <OutputColumn id="v_IT_L5B_20_CELL_IT_v" quantity="IT_L5B/20/CELL_IT/v"/>
            <OutputColumn id="v_IT_L5B_21_CELL_IT_v" quantity="IT_L5B/21/CELL_IT/v"/>
            <OutputColumn id="v_IT_L5B_22_CELL_IT_v" quantity="IT_L5B/22/CELL_IT/v"/>
            <OutputColumn id="v_IT_L5B_23_CELL_IT_v" quantity="IT_L5B/23/CELL_IT/v"/>
            <OutputColumn id="v_IT_L5B_24_CELL_IT_v" quantity="IT_L5B/24/CELL_IT/v"/>
            <OutputColumn id="v_IT_L5B_25_CELL_IT_v" quantity="IT_L5B/25/CELL_IT/v"/>
            <OutputColumn id="v_IT_L5B_26_CELL_IT_v" quantity="IT_L5B/26/CELL_IT/v"/>
            <OutputColumn id="v_IT_L5B_27_CELL_IT_v" quantity="IT_L5B/27/CELL_IT/v"/>
            <OutputColumn id="v_IT_L5B_28_CELL_IT_v" quantity="IT_L5B/28/CELL_IT/v"/>
            <OutputColumn id="v_IT_L5B_29_CELL_IT_v" quantity="IT_L5B/29/CELL_IT/v"/>
            <OutputColumn id="v_IT_L5B_30_CELL_IT_v" quantity="IT_L5B/30/CELL_IT/v"/>
            <OutputColumn id="v_IT_L5B_31_CELL_IT_v" quantity="IT_L5B/31/CELL_IT/v"/>
            <OutputColumn id="v_IT_L5B_32_CELL_IT_v" quantity="IT_L5B/32/CELL_IT/v"/>
        </OutputFile>

        <OutputFile id="Volts_file__PT_L5B" fileName="Sim_M1.PT_L5B.v.dat">
            <OutputColumn id="v_PT_L5B_0_CELL_PT_v" quantity="PT_L5B/0/CELL_PT/v"/>
            <OutputColumn id="v_PT_L5B_1_CELL_PT_v" quantity="PT_L5B/1/CELL_PT/v"/>
            <OutputColumn id="v_PT_L5B_2_CELL_PT_v" quantity="PT_L5B/2/CELL_PT/v"/>
            <OutputColumn id="v_PT_L5B_3_CELL_PT_v" quantity="PT_L5B/3/CELL_PT/v"/>
            <OutputColumn id="v_PT_L5B_4_CELL_PT_v" quantity="PT_L5B/4/CELL_PT/v"/>
            <OutputColumn id="v_PT_L5B_5_CELL_PT_v" quantity="PT_L5B/5/CELL_PT/v"/>
            <OutputColumn id="v_PT_L5B_6_CELL_PT_v" quantity="PT_L5B/6/CELL_PT/v"/>
            <OutputColumn id="v_PT_L5B_7_CELL_PT_v" quantity="PT_L5B/7/CELL_PT/v"/>
            <OutputColumn id="v_PT_L5B_8_CELL_PT_v" quantity="PT_L5B/8/CELL_PT/v"/>
            <OutputColumn id="v_PT_L5B_9_CELL_PT_v" quantity="PT_L5B/9/CELL_PT/v"/>
            <OutputColumn id="v_PT_L5B_10_CELL_PT_v" quantity="PT_L5B/10/CELL_PT/v"/>
            <OutputColumn id="v_PT_L5B_11_CELL_PT_v" quantity="PT_L5B/11/CELL_PT/v"/>
            <OutputColumn id="v_PT_L5B_12_CELL_PT_v" quantity="PT_L5B/12/CELL_PT/v"/>
            <OutputColumn id="v_PT_L5B_13_CELL_PT_v" quantity="PT_L5B/13/CELL_PT/v"/>
            <OutputColumn id="v_PT_L5B_14_CELL_PT_v" quantity="PT_L5B/14/CELL_PT/v"/>
            <OutputColumn id="v_PT_L5B_15_CELL_PT_v" quantity="PT_L5B/15/CELL_PT/v"/>
            <OutputColumn id="v_PT_L5B_16_CELL_PT_v" quantity="PT_L5B/16/CELL_PT/v"/>
            <OutputColumn id="v_PT_L5B_17_CELL_PT_v" quantity="PT_L5B/17/CELL_PT/v"/>
            <OutputColumn id="v_PT_L5B_18_CELL_PT_v" quantity="PT_L5B/18/CELL_PT/v"/>
            <OutputColumn id="v_PT_L5B_19_CELL_PT_v" quantity="PT_L5B/19/CELL_PT/v"/>
            <OutputColumn id="v_PT_L5B_20_CELL_PT_v" quantity="PT_L5B/20/CELL_PT/v"/>
            <OutputColumn id="v_PT_L5B_21_CELL_PT_v" quantity="PT_L5B/21/CELL_PT/v"/>
            <OutputColumn id="v_PT_L5B_22_CELL_PT_v" quantity="PT_L5B/22/CELL_PT/v"/>
            <OutputColumn id="v_PT_L5B_23_CELL_PT_v" quantity="PT_L5B/23/CELL_PT/v"/>
            <OutputColumn id="v_PT_L5B_24_CELL_PT_v" quantity="PT_L5B/24/CELL_PT/v"/>
            <OutputColumn id="v_PT_L5B_25_CELL_PT_v" quantity="PT_L5B/25/CELL_PT/v"/>
            <OutputColumn id="v_PT_L5B_26_CELL_PT_v" quantity="PT_L5B/26/CELL_PT/v"/>
            <OutputColumn id="v_PT_L5B_27_CELL_PT_v" quantity="PT_L5B/27/CELL_PT/v"/>
            <OutputColumn id="v_PT_L5B_28_CELL_PT_v" quantity="PT_L5B/28/CELL_PT/v"/>
            <OutputColumn id="v_PT_L5B_29_CELL_PT_v" quantity="PT_L5B/29/CELL_PT/v"/>
            <OutputColumn id="v_PT_L5B_30_CELL_PT_v" quantity="PT_L5B/30/CELL_PT/v"/>
            <OutputColumn id="v_PT_L5B_31_CELL_PT_v" quantity="PT_L5B/31/CELL_PT/v"/>
            <OutputColumn id="v_PT_L5B_32_CELL_PT_v" quantity="PT_L5B/32/CELL_PT/v"/>
        </OutputFile>

        <OutputFile id="Volts_file__IT_L6" fileName="Sim_M1.IT_L6.v.dat">
            <OutputColumn id="v_IT_L6_0_CELL_IT_v" quantity="IT_L6/0/CELL_IT/v"/>
            <OutputColumn id="v_IT_L6_1_CELL_IT_v" quantity="IT_L6/1/CELL_IT/v"/>
            <OutputColumn id="v_IT_L6_2_CELL_IT_v" quantity="IT_L6/2/CELL_IT/v"/>
            <OutputColumn id="v_IT_L6_3_CELL_IT_v" quantity="IT_L6/3/CELL_IT/v"/>
            <OutputColumn id="v_IT_L6_4_CELL_IT_v" quantity="IT_L6/4/CELL_IT/v"/>
            <OutputColumn id="v_IT_L6_5_CELL_IT_v" quantity="IT_L6/5/CELL_IT/v"/>
            <OutputColumn id="v_IT_L6_6_CELL_IT_v" quantity="IT_L6/6/CELL_IT/v"/>
            <OutputColumn id="v_IT_L6_7_CELL_IT_v" quantity="IT_L6/7/CELL_IT/v"/>
            <OutputColumn id="v_IT_L6_8_CELL_IT_v" quantity="IT_L6/8/CELL_IT/v"/>
            <OutputColumn id="v_IT_L6_9_CELL_IT_v" quantity="IT_L6/9/CELL_IT/v"/>
            <OutputColumn id="v_IT_L6_10_CELL_IT_v" quantity="IT_L6/10/CELL_IT/v"/>
            <OutputColumn id="v_IT_L6_11_CELL_IT_v" quantity="IT_L6/11/CELL_IT/v"/>
            <OutputColumn id="v_IT_L6_12_CELL_IT_v" quantity="IT_L6/12/CELL_IT/v"/>
            <OutputColumn id="v_IT_L6_13_CELL_IT_v" quantity="IT_L6/13/CELL_IT/v"/>
            <OutputColumn id="v_IT_L6_14_CELL_IT_v" quantity="IT_L6/14/CELL_IT/v"/>
            <OutputColumn id="v_IT_L6_15_CELL_IT_v" quantity="IT_L6/15/CELL_IT/v"/>
            <OutputColumn id="v_IT_L6_16_CELL_IT_v" quantity="IT_L6/16/CELL_IT/v"/>
            <OutputColumn id="v_IT_L6_17_CELL_IT_v" quantity="IT_L6/17/CELL_IT/v"/>
            <OutputColumn id="v_IT_L6_18_CELL_IT_v" quantity="IT_L6/18/CELL_IT/v"/>
            <OutputColumn id="v_IT_L6_19_CELL_IT_v" quantity="IT_L6/19/CELL_IT/v"/>
            <OutputColumn id="v_IT_L6_20_CELL_IT_v" quantity="IT_L6/20/CELL_IT/v"/>
            <OutputColumn id="v_IT_L6_21_CELL_IT_v" quantity="IT_L6/21/CELL_IT/v"/>
            <OutputColumn id="v_IT_L6_22_CELL_IT_v" quantity="IT_L6/22/CELL_IT/v"/>
            <OutputColumn id="v_IT_L6_23_CELL_IT_v" quantity="IT_L6/23/CELL_IT/v"/>
            <OutputColumn id="v_IT_L6_24_CELL_IT_v" quantity="IT_L6/24/CELL_IT/v"/>
            <OutputColumn id="v_IT_L6_25_CELL_IT_v" quantity="IT_L6/25/CELL_IT/v"/>
            <OutputColumn id="v_IT_L6_26_CELL_IT_v" quantity="IT_L6/26/CELL_IT/v"/>
            <OutputColumn id="v_IT_L6_27_CELL_IT_v" quantity="IT_L6/27/CELL_IT/v"/>
            <OutputColumn id="v_IT_L6_28_CELL_IT_v" quantity="IT_L6/28/CELL_IT/v"/>
            <OutputColumn id="v_IT_L6_29_CELL_IT_v" quantity="IT_L6/29/CELL_IT/v"/>
            <OutputColumn id="v_IT_L6_30_CELL_IT_v" quantity="IT_L6/30/CELL_IT/v"/>
        </OutputFile>

        <OutputFile id="Volts_file__CT_L6" fileName="Sim_M1.CT_L6.v.dat">
            <OutputColumn id="v_CT_L6_0_CELL_CT_v" quantity="CT_L6/0/CELL_CT/v"/>
            <OutputColumn id="v_CT_L6_1_CELL_CT_v" quantity="CT_L6/1/CELL_CT/v"/>
            <OutputColumn id="v_CT_L6_2_CELL_CT_v" quantity="CT_L6/2/CELL_CT/v"/>
            <OutputColumn id="v_CT_L6_3_CELL_CT_v" quantity="CT_L6/3/CELL_CT/v"/>
            <OutputColumn id="v_CT_L6_4_CELL_CT_v" quantity="CT_L6/4/CELL_CT/v"/>
            <OutputColumn id="v_CT_L6_5_CELL_CT_v" quantity="CT_L6/5/CELL_CT/v"/>
            <OutputColumn id="v_CT_L6_6_CELL_CT_v" quantity="CT_L6/6/CELL_CT/v"/>
            <OutputColumn id="v_CT_L6_7_CELL_CT_v" quantity="CT_L6/7/CELL_CT/v"/>
            <OutputColumn id="v_CT_L6_8_CELL_CT_v" quantity="CT_L6/8/CELL_CT/v"/>
            <OutputColumn id="v_CT_L6_9_CELL_CT_v" quantity="CT_L6/9/CELL_CT/v"/>
            <OutputColumn id="v_CT_L6_10_CELL_CT_v" quantity="CT_L6/10/CELL_CT/v"/>
            <OutputColumn id="v_CT_L6_11_CELL_CT_v" quantity="CT_L6/11/CELL_CT/v"/>
            <OutputColumn id="v_CT_L6_12_CELL_CT_v" quantity="CT_L6/12/CELL_CT/v"/>
            <OutputColumn id="v_CT_L6_13_CELL_CT_v" quantity="CT_L6/13/CELL_CT/v"/>
            <OutputColumn id="v_CT_L6_14_CELL_CT_v" quantity="CT_L6/14/CELL_CT/v"/>
            <OutputColumn id="v_CT_L6_15_CELL_CT_v" quantity="CT_L6/15/CELL_CT/v"/>
            <OutputColumn id="v_CT_L6_16_CELL_CT_v" quantity="CT_L6/16/CELL_CT/v"/>
            <OutputColumn id="v_CT_L6_17_CELL_CT_v" quantity="CT_L6/17/CELL_CT/v"/>
            <OutputColumn id="v_CT_L6_18_CELL_CT_v" quantity="CT_L6/18/CELL_CT/v"/>
            <OutputColumn id="v_CT_L6_19_CELL_CT_v" quantity="CT_L6/19/CELL_CT/v"/>
            <OutputColumn id="v_CT_L6_20_CELL_CT_v" quantity="CT_L6/20/CELL_CT/v"/>
            <OutputColumn id="v_CT_L6_21_CELL_CT_v" quantity="CT_L6/21/CELL_CT/v"/>
            <OutputColumn id="v_CT_L6_22_CELL_CT_v" quantity="CT_L6/22/CELL_CT/v"/>
            <OutputColumn id="v_CT_L6_23_CELL_CT_v" quantity="CT_L6/23/CELL_CT/v"/>
            <OutputColumn id="v_CT_L6_24_CELL_CT_v" quantity="CT_L6/24/CELL_CT/v"/>
            <OutputColumn id="v_CT_L6_25_CELL_CT_v" quantity="CT_L6/25/CELL_CT/v"/>
            <OutputColumn id="v_CT_L6_26_CELL_CT_v" quantity="CT_L6/26/CELL_CT/v"/>
            <OutputColumn id="v_CT_L6_27_CELL_CT_v" quantity="CT_L6/27/CELL_CT/v"/>
            <OutputColumn id="v_CT_L6_28_CELL_CT_v" quantity="CT_L6/28/CELL_CT/v"/>
            <OutputColumn id="v_CT_L6_29_CELL_CT_v" quantity="CT_L6/29/CELL_CT/v"/>
            <OutputColumn id="v_CT_L6_30_CELL_CT_v" quantity="CT_L6/30/CELL_CT/v"/>
        </OutputFile>

        <OutputFile id="Volts_file__PV_L23" fileName="Sim_M1.PV_L23.v.dat">
            <OutputColumn id="v_PV_L23_0_CELL_PV_v" quantity="PV_L23/0/CELL_PV/v"/>
            <OutputColumn id="v_PV_L23_1_CELL_PV_v" quantity="PV_L23/1/CELL_PV/v"/>
            <OutputColumn id="v_PV_L23_2_CELL_PV_v" quantity="PV_L23/2/CELL_PV/v"/>
            <OutputColumn id="v_PV_L23_3_CELL_PV_v" quantity="PV_L23/3/CELL_PV/v"/>
            <OutputColumn id="v_PV_L23_4_CELL_PV_v" quantity="PV_L23/4/CELL_PV/v"/>
            <OutputColumn id="v_PV_L23_5_CELL_PV_v" quantity="PV_L23/5/CELL_PV/v"/>
            <OutputColumn id="v_PV_L23_6_CELL_PV_v" quantity="PV_L23/6/CELL_PV/v"/>
        </OutputFile>

        <OutputFile id="Volts_file__SOM_L23" fileName="Sim_M1.SOM_L23.v.dat">
            <OutputColumn id="v_SOM_L23_0_CELL_SOM_v" quantity="SOM_L23/0/CELL_SOM/v"/>
            <OutputColumn id="v_SOM_L23_1_CELL_SOM_v" quantity="SOM_L23/1/CELL_SOM/v"/>
            <OutputColumn id="v_SOM_L23_2_CELL_SOM_v" quantity="SOM_L23/2/CELL_SOM/v"/>
            <OutputColumn id="v_SOM_L23_3_CELL_SOM_v" quantity="SOM_L23/3/CELL_SOM/v"/>
            <OutputColumn id="v_SOM_L23_4_CELL_SOM_v" quantity="SOM_L23/4/CELL_SOM/v"/>
            <OutputColumn id="v_SOM_L23_5_CELL_SOM_v" quantity="SOM_L23/5/CELL_SOM/v"/>
            <OutputColumn id="v_SOM_L23_6_CELL_SOM_v" quantity="SOM_L23/6/CELL_SOM/v"/>
        </OutputFile>

        <OutputFile id="Volts_file__PV_L5" fileName="Sim_M1.PV_L5.v.dat">
            <OutputColumn id="v_PV_L5_0_CELL_PV_v" quantity="PV_L5/0/CELL_PV/v"/>
            <OutputColumn id="v_PV_L5_1_CELL_PV_v" quantity="PV_L5/1/CELL_PV/v"/>
            <OutputColumn id="v_PV_L5_2_CELL_PV_v" quantity="PV_L5/2/CELL_PV/v"/>
            <OutputColumn id="v_PV_L5_3_CELL_PV_v" quantity="PV_L5/3/CELL_PV/v"/>
            <OutputColumn id="v_PV_L5_4_CELL_PV_v" quantity="PV_L5/4/CELL_PV/v"/>
            <OutputColumn id="v_PV_L5_5_CELL_PV_v" quantity="PV_L5/5/CELL_PV/v"/>
            <OutputColumn id="v_PV_L5_6_CELL_PV_v" quantity="PV_L5/6/CELL_PV/v"/>
            <OutputColumn id="v_PV_L5_7_CELL_PV_v" quantity="PV_L5/7/CELL_PV/v"/>
            <OutputColumn id="v_PV_L5_8_CELL_PV_v" quantity="PV_L5/8/CELL_PV/v"/>
            <OutputColumn id="v_PV_L5_9_CELL_PV_v" quantity="PV_L5/9/CELL_PV/v"/>
            <OutputColumn id="v_PV_L5_10_CELL_PV_v" quantity="PV_L5/10/CELL_PV/v"/>
            <OutputColumn id="v_PV_L5_11_CELL_PV_v" quantity="PV_L5/11/CELL_PV/v"/>
            <OutputColumn id="v_PV_L5_12_CELL_PV_v" quantity="PV_L5/12/CELL_PV/v"/>
            <OutputColumn id="v_PV_L5_13_CELL_PV_v" quantity="PV_L5/13/CELL_PV/v"/>
            <OutputColumn id="v_PV_L5_14_CELL_PV_v" quantity="PV_L5/14/CELL_PV/v"/>
        </OutputFile>

        <OutputFile id="Volts_file__SOM_L5" fileName="Sim_M1.SOM_L5.v.dat">
            <OutputColumn id="v_SOM_L5_0_CELL_SOM_v" quantity="SOM_L5/0/CELL_SOM/v"/>
            <OutputColumn id="v_SOM_L5_1_CELL_SOM_v" quantity="SOM_L5/1/CELL_SOM/v"/>
            <OutputColumn id="v_SOM_L5_2_CELL_SOM_v" quantity="SOM_L5/2/CELL_SOM/v"/>
            <OutputColumn id="v_SOM_L5_3_CELL_SOM_v" quantity="SOM_L5/3/CELL_SOM/v"/>
            <OutputColumn id="v_SOM_L5_4_CELL_SOM_v" quantity="SOM_L5/4/CELL_SOM/v"/>
            <OutputColumn id="v_SOM_L5_5_CELL_SOM_v" quantity="SOM_L5/5/CELL_SOM/v"/>
            <OutputColumn id="v_SOM_L5_6_CELL_SOM_v" quantity="SOM_L5/6/CELL_SOM/v"/>
            <OutputColumn id="v_SOM_L5_7_CELL_SOM_v" quantity="SOM_L5/7/CELL_SOM/v"/>
            <OutputColumn id="v_SOM_L5_8_CELL_SOM_v" quantity="SOM_L5/8/CELL_SOM/v"/>
            <OutputColumn id="v_SOM_L5_9_CELL_SOM_v" quantity="SOM_L5/9/CELL_SOM/v"/>
            <OutputColumn id="v_SOM_L5_10_CELL_SOM_v" quantity="SOM_L5/10/CELL_SOM/v"/>
            <OutputColumn id="v_SOM_L5_11_CELL_SOM_v" quantity="SOM_L5/11/CELL_SOM/v"/>
            <OutputColumn id="v_SOM_L5_12_CELL_SOM_v" quantity="SOM_L5/12/CELL_SOM/v"/>
            <OutputColumn id="v_SOM_L5_13_CELL_SOM_v" quantity="SOM_L5/13/CELL_SOM/v"/>
            <OutputColumn id="v_SOM_L5_14_CELL_SOM_v" quantity="SOM_L5/14/CELL_SOM/v"/>
        </OutputFile>

        <OutputFile id="Volts_file__PV_L6" fileName="Sim_M1.PV_L6.v.dat">
            <OutputColumn id="v_PV_L6_0_CELL_PV_v" quantity="PV_L6/0/CELL_PV/v"/>
            <OutputColumn id="v_PV_L6_1_CELL_PV_v" quantity="PV_L6/1/CELL_PV/v"/>
            <OutputColumn id="v_PV_L6_2_CELL_PV_v" quantity="PV_L6/2/CELL_PV/v"/>
            <OutputColumn id="v_PV_L6_3_CELL_PV_v" quantity="PV_L6/3/CELL_PV/v"/>
            <OutputColumn id="v_PV_L6_4_CELL_PV_v" quantity="PV_L6/4/CELL_PV/v"/>
            <OutputColumn id="v_PV_L6_5_CELL_PV_v" quantity="PV_L6/5/CELL_PV/v"/>
            <OutputColumn id="v_PV_L6_6_CELL_PV_v" quantity="PV_L6/6/CELL_PV/v"/>
        </OutputFile>

        <OutputFile id="Volts_file__SOM_L6" fileName="Sim_M1.SOM_L6.v.dat">
            <OutputColumn id="v_SOM_L6_0_CELL_SOM_v" quantity="SOM_L6/0/CELL_SOM/v"/>
            <OutputColumn id="v_SOM_L6_1_CELL_SOM_v" quantity="SOM_L6/1/CELL_SOM/v"/>
            <OutputColumn id="v_SOM_L6_2_CELL_SOM_v" quantity="SOM_L6/2/CELL_SOM/v"/>
            <OutputColumn id="v_SOM_L6_3_CELL_SOM_v" quantity="SOM_L6/3/CELL_SOM/v"/>
            <OutputColumn id="v_SOM_L6_4_CELL_SOM_v" quantity="SOM_L6/4/CELL_SOM/v"/>
            <OutputColumn id="v_SOM_L6_5_CELL_SOM_v" quantity="SOM_L6/5/CELL_SOM/v"/>
            <OutputColumn id="v_SOM_L6_6_CELL_SOM_v" quantity="SOM_L6/6/CELL_SOM/v"/>
        </OutputFile>

    </Simulation>

</Lems>
