<neuroml xmlns="http://www.neuroml.org/schema/neuroml2"  xmlns:xs="http://www.w3.org/2001/XMLSchema" xmlns:xsi="http://www.w3.org/2001/XMLSchema-instance" xsi:schemaLocation="http://www.neuroml.org/schema/neuroml2 https://raw.github.com/NeuroML/NeuroML2/development/Schemas/NeuroML2/NeuroML_v2beta4.xsd" id="M1">
    <notes>NeuroML 2 file exported from NetPyNE v0.4.9</notes>
    <include href="Izhi2007b.cell.nml"></include>
    <include href="Izhi2007b.cell.nml"></include>
    <include href="Izhi2007b.cell.nml"></include>
    <include href="Izhi2007b.cell.nml"></include>
    <include href="Izhi2007b.cell.nml"></include>
    <include href="Izhi2007b.cell.nml"></include>
    <include href="Izhi2007b.cell.nml"></include>
    <include href="Izhi2007b.cell.nml"></include>
    <include href="Izhi2007b.cell.nml"></include>
    <include href="Izhi2007b.cell.nml"></include>
    <include href="Izhi2007b.cell.nml"></include>
    <include href="Izhi2007b.cell.nml"></include>
    <include href="Izhi2007b.cell.nml"></include>
    <expTwoSynapse id="AMPA" gbase="1uS" erev="0mV" tauDecay="5.3ms" tauRise="0.05ms"/>
    <expTwoSynapse id="NMDA" gbase="1uS" erev="0mV" tauDecay="15ms" tauRise="0.15ms"/>
    <expTwoSynapse id="GABAA" gbase="1uS" erev="-80mV" tauDecay="9.1ms" tauRise="0.07ms"/>
    <expTwoSynapse id="GABAB" gbase="1uS" erev="-80mV" tauDecay="9.1ms" tauRise="0.07ms"/>
    <spikeGeneratorPoisson id="NetStim_background_E_IT_L6_20_1_NMDA" averageRate="20 Hz"/>
    <spikeGeneratorPoisson id="NetStim_background_I_PV_L6_20_1_NMDA" averageRate="20 Hz"/>
    <spikeGeneratorPoisson id="NetStim_background_E_IT_L5B_20_1_NMDA" averageRate="20 Hz"/>
    <spikeGeneratorPoisson id="NetStim_background_I_SOM_L23_20_1_NMDA" averageRate="20 Hz"/>
    <spikeGeneratorPoisson id="NetStim_background_E_PT_L5B_20_1_NMDA" averageRate="20 Hz"/>
    <spikeGeneratorPoisson id="NetStim_background_E_IT_L4_20_1_NMDA" averageRate="20 Hz"/>
    <spikeGeneratorPoisson id="NetStim_background_I_PV_L23_20_1_NMDA" averageRate="20 Hz"/>
    <spikeGeneratorPoisson id="NetStim_background_I_SOM_L6_20_1_NMDA" averageRate="20 Hz"/>
    <spikeGeneratorPoisson id="NetStim_background_E_CT_L6_20_1_NMDA" averageRate="20 Hz"/>
    <spikeGeneratorPoisson id="NetStim_background_E_IT_L23_20_1_NMDA" averageRate="20 Hz"/>
    <spikeGeneratorPoisson id="NetStim_background_I_SOM_L5_20_1_NMDA" averageRate="20 Hz"/>
    <spikeGeneratorPoisson id="NetStim_background_E_IT_L5A_20_1_NMDA" averageRate="20 Hz"/>
    <spikeGeneratorPoisson id="NetStim_background_I_PV_L5_20_1_NMDA" averageRate="20 Hz"/>
    <network id="M1">
        <population id="IT_L23" component="Izhi2007b" size="51" type="populationList">
            <instance id="0">
                <location x="40.776610383388785" y="328.471943786871407" z="7.731198475902096"/>
            </instance>
            <instance id="1">
                <location x="6.022194954686372" y="293.138157473836316" z="22.39576168312335"/>
            </instance>
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        </population>
        <population id="IT_L4" component="Izhi2007b" size="26" type="populationList">
            <instance id="0">
                <location x="41.361956922620301" y="479.660247919129347" z="27.039553012177421"/>
            </instance>
            <instance id="1">
                <location x="38.88649574417785" y="492.710068959382625" z="8.77953882413215"/>
            </instance>
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        </population>
        <population id="IT_L5A" component="Izhi2007b" size="29" type="populationList">
            <instance id="0">
                <location x="32.145463061679287" y="599.143574173536877" z="34.437312139072127"/>
            </instance>
            <instance id="1">
                <location x="17.398711243878985" y="660.948379193467076" z="17.675770188884133"/>
            </instance>
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        </population>
        <population id="IT_L5B" component="Izhi2007b" size="33" type="populationList">
            <instance id="0">
                <location x="9.730522545353381" y="828.151734544686292" z="7.526073899498797"/>
            </instance>
            <instance id="1">
                <location x="23.325455020939607" y="782.159184667170962" z="11.738542506360773"/>
            </instance>
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        </population>
        <population id="PT_L5B" component="Izhi2007b" size="33" type="populationList">
            <instance id="0">
                <location x="8.234890522730803" y="801.528198214096506" z="49.884292491059576"/>
            </instance>
            <instance id="1">
                <location x="10.143452362770395" y="947.132366426444264" z="23.891271231599433"/>
            </instance>
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        </population>
        <population id="IT_L6" component="Izhi2007b" size="31" type="populationList">
            <instance id="0">
                <location x="25.092219546943507" y="1344.656588358200224" z="37.036590406050728"/>
            </instance>
            <instance id="1">
                <location x="36.869268909957377" y="1111.161329786244323" z="7.846477173444305"/>
            </instance>
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        </population>
        <population id="CT_L6" component="Izhi2007b" size="31" type="populationList">
            <instance id="0">
                <location x="29.763811471755258" y="1149.822417242108259" z="24.028185966046507"/>
            </instance>
            <instance id="1">
                <location x="16.480477704934671" y="1254.178833872666701" z="1.116325454307504"/>
            </instance>
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        </population>
        <population id="PV_L23" component="Izhi2007b" size="7" type="populationList">
            <instance id="0">
                <location x="15.576895357358007" y="163.407056345179541" z="45.431824807038467"/>
            </instance>
            <instance id="1">
                <location x="38.320074814817836" y="209.265185725817275" z="9.302916384863652"/>
            </instance>
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        </population>
        <population id="SOM_L23" component="Izhi2007b" size="7" type="populationList">
            <instance id="0">
                <location x="38.87788975905935" y="332.00501391547192" z="19.896563845012949"/>
            </instance>
            <instance id="1">
                <location x="37.041989767082988" y="350.119382600149834" z="5.972816549122157"/>
            </instance>
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        </population>
        <population id="PV_L5" component="Izhi2007b" size="15" type="populationList">
            <instance id="0">
                <location x="46.206746813725928" y="812.578244140973197" z="15.975920498785651"/>
            </instance>
            <instance id="1">
                <location x="28.032536022042741" y="627.17800312347515" z="42.149105471724738"/>
            </instance>
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        </population>
        <population id="SOM_L5" component="Izhi2007b" size="15" type="populationList">
            <instance id="0">
                <location x="27.931080763908788" y="1005.786619173956637" z="36.384892747883164"/>
            </instance>
            <instance id="1">
                <location x="46.619817111522323" y="925.225786291036457" z="7.263414403087603"/>
            </instance>
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        </population>
        <population id="PV_L6" component="Izhi2007b" size="7" type="populationList">
            <instance id="0">
                <location x="2.374384226535859" y="1149.910988196392736" z="48.228525350728304"/>
            </instance>
            <instance id="1">
                <location x="15.752028751087559" y="1272.229043512787484" z="0.536667704522298"/>
            </instance>
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        </population>
        <population id="SOM_L6" component="Izhi2007b" size="7" type="populationList">
            <instance id="0">
                <location x="15.722322139879951" y="1041.044285773876027" z="46.655816133633216"/>
            </instance>
            <instance id="1">
                <location x="11.278597739286417" y="1154.383381431884118" z="40.407899118709835"/>
            </instance>
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        </population>
        <population id="Pop_NetStim_background_E_IT_L6_20_1_NMDA" component="NetStim_background_E_IT_L6_20_1_NMDA" size="31"/>
        <population id="Pop_NetStim_background_I_PV_L6_20_1_NMDA" component="NetStim_background_I_PV_L6_20_1_NMDA" size="7"/>
        <population id="Pop_NetStim_background_E_IT_L5B_20_1_NMDA" component="NetStim_background_E_IT_L5B_20_1_NMDA" size="33"/>
        <population id="Pop_NetStim_background_I_SOM_L23_20_1_NMDA" component="NetStim_background_I_SOM_L23_20_1_NMDA" size="7"/>
        <population id="Pop_NetStim_background_E_PT_L5B_20_1_NMDA" component="NetStim_background_E_PT_L5B_20_1_NMDA" size="33"/>
        <population id="Pop_NetStim_background_E_IT_L4_20_1_NMDA" component="NetStim_background_E_IT_L4_20_1_NMDA" size="26"/>
        <population id="Pop_NetStim_background_I_PV_L23_20_1_NMDA" component="NetStim_background_I_PV_L23_20_1_NMDA" size="7"/>
        <population id="Pop_NetStim_background_I_SOM_L6_20_1_NMDA" component="NetStim_background_I_SOM_L6_20_1_NMDA" size="7"/>
        <population id="Pop_NetStim_background_E_CT_L6_20_1_NMDA" component="NetStim_background_E_CT_L6_20_1_NMDA" size="31"/>
        <population id="Pop_NetStim_background_E_IT_L23_20_1_NMDA" component="NetStim_background_E_IT_L23_20_1_NMDA" size="51"/>
        <population id="Pop_NetStim_background_I_SOM_L5_20_1_NMDA" component="NetStim_background_I_SOM_L5_20_1_NMDA" size="15"/>
        <population id="Pop_NetStim_background_E_IT_L5A_20_1_NMDA" component="NetStim_background_E_IT_L5A_20_1_NMDA" size="29"/>
        <population id="Pop_NetStim_background_I_PV_L5_20_1_NMDA" component="NetStim_background_I_PV_L5_20_1_NMDA" size="15"/>
        <projection id="NetConn_NetStim_background_E_IT_L6_20_1_NMDA__IT_L6" presynapticPopulation="Pop_NetStim_background_E_IT_L6_20_1_NMDA" postsynapticPopulation="IT_L6" synapse="NMDA">
            <connectionWD id="0" preCellId="../Pop_NetStim_background_E_IT_L6_20_1_NMDA[0]" postCellId="../IT_L6/0/Izhi2007b" weight="0.1" delay="3.64782565431 ms"/>
            <connectionWD id="1" preCellId="../Pop_NetStim_background_E_IT_L6_20_1_NMDA[1]" postCellId="../IT_L6/1/Izhi2007b" weight="0.1" delay="5.66585617687 ms"/>
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        </projection>
        <projection id="NetConn_NetStim_background_I_PV_L6_20_1_NMDA__PV_L6" presynapticPopulation="Pop_NetStim_background_I_PV_L6_20_1_NMDA" postsynapticPopulation="PV_L6" synapse="NMDA">
            <connectionWD id="0" preCellId="../Pop_NetStim_background_I_PV_L6_20_1_NMDA[0]" postCellId="../PV_L6/0/Izhi2007b" weight="0.05" delay="5.45382903223 ms"/>
            <connectionWD id="1" preCellId="../Pop_NetStim_background_I_PV_L6_20_1_NMDA[1]" postCellId="../PV_L6/1/Izhi2007b" weight="0.05" delay="6.88125873606 ms"/>
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        </projection>
        <projection id="NetConn_NetStim_background_E_IT_L5B_20_1_NMDA__IT_L5B" presynapticPopulation="Pop_NetStim_background_E_IT_L5B_20_1_NMDA" postsynapticPopulation="IT_L5B" synapse="NMDA">
            <connectionWD id="0" preCellId="../Pop_NetStim_background_E_IT_L5B_20_1_NMDA[0]" postCellId="../IT_L5B/0/Izhi2007b" weight="0.1" delay="7.80713608379 ms"/>
            <connectionWD id="1" preCellId="../Pop_NetStim_background_E_IT_L5B_20_1_NMDA[1]" postCellId="../IT_L5B/1/Izhi2007b" weight="0.1" delay="4.51710605867 ms"/>
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        </projection>
        <projection id="NetConn_NetStim_background_I_SOM_L23_20_1_NMDA__SOM_L23" presynapticPopulation="Pop_NetStim_background_I_SOM_L23_20_1_NMDA" postsynapticPopulation="SOM_L23" synapse="NMDA">
            <connectionWD id="0" preCellId="../Pop_NetStim_background_I_SOM_L23_20_1_NMDA[0]" postCellId="../SOM_L23/0/Izhi2007b" weight="0.03" delay="5.66171600277 ms"/>
            <connectionWD id="1" preCellId="../Pop_NetStim_background_I_SOM_L23_20_1_NMDA[1]" postCellId="../SOM_L23/1/Izhi2007b" weight="0.03" delay="7.41293586153 ms"/>
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        </projection>
        <projection id="NetConn_NetStim_background_E_PT_L5B_20_1_NMDA__PT_L5B" presynapticPopulation="Pop_NetStim_background_E_PT_L5B_20_1_NMDA" postsynapticPopulation="PT_L5B" synapse="NMDA">
            <connectionWD id="0" preCellId="../Pop_NetStim_background_E_PT_L5B_20_1_NMDA[0]" postCellId="../PT_L5B/0/Izhi2007b" weight="0.1" delay="-0.804210189883 ms"/>
            <connectionWD id="1" preCellId="../Pop_NetStim_background_E_PT_L5B_20_1_NMDA[1]" postCellId="../PT_L5B/1/Izhi2007b" weight="0.1" delay="4.71517003455 ms"/>
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        </projection>
        <projection id="NetConn_NetStim_background_E_IT_L4_20_1_NMDA__IT_L4" presynapticPopulation="Pop_NetStim_background_E_IT_L4_20_1_NMDA" postsynapticPopulation="IT_L4" synapse="NMDA">
            <connectionWD id="0" preCellId="../Pop_NetStim_background_E_IT_L4_20_1_NMDA[0]" postCellId="../IT_L4/0/Izhi2007b" weight="0.1" delay="4.73777373968 ms"/>
            <connectionWD id="1" preCellId="../Pop_NetStim_background_E_IT_L4_20_1_NMDA[1]" postCellId="../IT_L4/1/Izhi2007b" weight="0.1" delay="6.42940996321 ms"/>
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        </projection>
        <projection id="NetConn_NetStim_background_I_PV_L23_20_1_NMDA__PV_L23" presynapticPopulation="Pop_NetStim_background_I_PV_L23_20_1_NMDA" postsynapticPopulation="PV_L23" synapse="NMDA">
            <connectionWD id="0" preCellId="../Pop_NetStim_background_I_PV_L23_20_1_NMDA[0]" postCellId="../PV_L23/0/Izhi2007b" weight="0.05" delay="6.36477269006 ms"/>
            <connectionWD id="1" preCellId="../Pop_NetStim_background_I_PV_L23_20_1_NMDA[1]" postCellId="../PV_L23/1/Izhi2007b" weight="0.05" delay="2.70311209405 ms"/>
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        </projection>
        <projection id="NetConn_NetStim_background_I_SOM_L6_20_1_NMDA__SOM_L6" presynapticPopulation="Pop_NetStim_background_I_SOM_L6_20_1_NMDA" postsynapticPopulation="SOM_L6" synapse="NMDA">
            <connectionWD id="0" preCellId="../Pop_NetStim_background_I_SOM_L6_20_1_NMDA[0]" postCellId="../SOM_L6/0/Izhi2007b" weight="0.03" delay="6.8462255573 ms"/>
            <connectionWD id="1" preCellId="../Pop_NetStim_background_I_SOM_L6_20_1_NMDA[1]" postCellId="../SOM_L6/1/Izhi2007b" weight="0.03" delay="2.8447195764 ms"/>
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        </projection>
        <projection id="NetConn_NetStim_background_E_CT_L6_20_1_NMDA__CT_L6" presynapticPopulation="Pop_NetStim_background_E_CT_L6_20_1_NMDA" postsynapticPopulation="CT_L6" synapse="NMDA">
            <connectionWD id="0" preCellId="../Pop_NetStim_background_E_CT_L6_20_1_NMDA[0]" postCellId="../CT_L6/0/Izhi2007b" weight="0.1" delay="3.11618360623 ms"/>
            <connectionWD id="1" preCellId="../Pop_NetStim_background_E_CT_L6_20_1_NMDA[1]" postCellId="../CT_L6/1/Izhi2007b" weight="0.1" delay="2.10247068851 ms"/>
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        </projection>
        <projection id="NetConn_NetStim_background_E_IT_L23_20_1_NMDA__IT_L23" presynapticPopulation="Pop_NetStim_background_E_IT_L23_20_1_NMDA" postsynapticPopulation="IT_L23" synapse="NMDA">
            <connectionWD id="0" preCellId="../Pop_NetStim_background_E_IT_L23_20_1_NMDA[0]" postCellId="../IT_L23/0/Izhi2007b" weight="0.1" delay="7.36605260425 ms"/>
            <connectionWD id="1" preCellId="../Pop_NetStim_background_E_IT_L23_20_1_NMDA[1]" postCellId="../IT_L23/1/Izhi2007b" weight="0.1" delay="7.61731377992 ms"/>
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        </projection>
        <projection id="NetConn_NetStim_background_I_SOM_L5_20_1_NMDA__SOM_L5" presynapticPopulation="Pop_NetStim_background_I_SOM_L5_20_1_NMDA" postsynapticPopulation="SOM_L5" synapse="NMDA">
            <connectionWD id="0" preCellId="../Pop_NetStim_background_I_SOM_L5_20_1_NMDA[0]" postCellId="../SOM_L5/0/Izhi2007b" weight="0.03" delay="4.04044109209 ms"/>
            <connectionWD id="1" preCellId="../Pop_NetStim_background_I_SOM_L5_20_1_NMDA[1]" postCellId="../SOM_L5/1/Izhi2007b" weight="0.03" delay="4.61023539917 ms"/>
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        </projection>
        <projection id="NetConn_NetStim_background_E_IT_L5A_20_1_NMDA__IT_L5A" presynapticPopulation="Pop_NetStim_background_E_IT_L5A_20_1_NMDA" postsynapticPopulation="IT_L5A" synapse="NMDA">
            <connectionWD id="0" preCellId="../Pop_NetStim_background_E_IT_L5A_20_1_NMDA[0]" postCellId="../IT_L5A/0/Izhi2007b" weight="0.1" delay="1.75656230362 ms"/>
            <connectionWD id="1" preCellId="../Pop_NetStim_background_E_IT_L5A_20_1_NMDA[1]" postCellId="../IT_L5A/1/Izhi2007b" weight="0.1" delay="7.1005913071 ms"/>
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        </projection>
        <projection id="NetConn_NetStim_background_I_PV_L5_20_1_NMDA__PV_L5" presynapticPopulation="Pop_NetStim_background_I_PV_L5_20_1_NMDA" postsynapticPopulation="PV_L5" synapse="NMDA">
            <connectionWD id="0" preCellId="../Pop_NetStim_background_I_PV_L5_20_1_NMDA[0]" postCellId="../PV_L5/0/Izhi2007b" weight="0.05" delay="2.7087450854 ms"/>
            <connectionWD id="1" preCellId="../Pop_NetStim_background_I_PV_L5_20_1_NMDA[1]" postCellId="../PV_L5/1/Izhi2007b" weight="0.05" delay="2.27997215457 ms"/>
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        </projection>
    </network>
</neuroml>
